*Heading
** integrated original axisymmetric PCMI path, CAX4RT.
*Preprint, echo=NO, model=NO, history=NO, contact=NO
*Include, input=b13_integrated_cax4rt_mesh.inc
*Material, name=FUEL
*Elastic
2e11, 0.316
*Expansion, zero=600
1e-5
*Density
10970
*Specific Heat
300
*Conductivity
8.258, 500
8.227529880478087, 502
8.197301587301586, 504
8.167312252964427, 506
8.13755905511811, 508
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2.1396, 2500
*Material, name=CLADDING
*Elastic
7.5e10, 0.3
*Density
6500
*Specific Heat
330
*Conductivity
16
*Expansion, zero=600
5e-6
*Plastic
1000000, 0
20001000000, 1
*Creep, law=TIME
8e-28, 3, 0
*Solid Section, elset=FUEL, material=FUEL
,
*Solid Section, elset=CLAD, material=CLADDING
,
*Initial Conditions, type=TEMPERATURE
ALL, 600
*Surface Interaction, name=INTERFACE
*Surface Behavior, pressure-overclosure=LINEAR
1e12
*Friction
0.002
*Gap Heat Generation
0
*Gap Conductance
4000, 0
4000.0000000000005, 0.000001
3960.396039603961, 0.0000010099999999999999
3921.1841976276846, 0.0000010200999999999998
3882.360591710579, 0.0000010303009999999997
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0.004, 1
*Contact Pair, interaction=INTERFACE, type=NODE TO SURFACE, adjust=0, smooth=0
S_FUEL_RIGHT, S_CLAD_LEFT
*Amplitude, name=POWER, time=TOTAL TIME
0, 0, 0.5, 0.4, 1.5, 1, 3, 0.8
4.5, 1.2, 6, 1
*Amplitude, name=INTERNAL_PRESSURE, time=TOTAL TIME
0, 0, 0.5, 0.25, 1.5, 1, 3, 0.7
4.5, 1.1, 6, 1
*Amplitude, name=EXTERNAL_PRESSURE, time=TOTAL TIME
0, 0, 0.5, 0.8, 1.5, 1, 3, 1.2
4.5, 0.9, 6, 1
*Amplitude, name=AXIAL_SLIDE, time=TOTAL TIME
0, 0, 0.5, 6e-5, 1.5, 2.4e-4, 3, 3.6e-4
4.5, 4.8e-4, 6, 6e-4
*Step, name=PCMI, nlgeom=YES, inc=96
*Coupled Temperature-Displacement
.0625, 6, .0625, .0625
*Controls, parameters=FIELD, field=DISPLACEMENT
1e-10, 1e-10, , , , 1e-10
*Controls, parameters=FIELD, field=TEMPERATURE
1e-10, 1e-10, , , , 1e-10
*Boundary
FUEL_LEFT, 1, 1, 0
CLAD_BOTTOM, 2, 2, 0
CLAD_RIGHT, 11, 11, 600
*Boundary, amplitude=AXIAL_SLIDE
FUEL_TOP, 2, 2, 1
*Dflux, amplitude=POWER
FUEL, BF, 2e7
*Dsload, amplitude=INTERNAL_PRESSURE
S_CLAD_LEFT, P, 5e5
*Dsload, amplitude=EXTERNAL_PRESSURE
S_CLAD_RIGHT, P, 2e6
*Output, field, frequency=1
*Node Output
NT, U, RF, RFL
*Element Output, directions=YES
S, EE, PE, PEEQ, CE, CEEQ, COORD, IVOL, HFL
*Contact Output
CSTRESS, CDISP, CFORCE, HFL
*Output, history, frequency=0
*End Step
