*Heading
** Native node-to-surface (NTS) heat transfer, area, projection and friction identification.
*Preprint, echo=NO, model=NO, history=NO, contact=NO
*Include, input=b13_small_cax8t_mesh.inc
*Material, name=SOLID
*Elastic
1e6, 0.3
*Conductivity
1e-12
*Density
1
*Specific Heat
1
*Solid Section, elset=FUEL, material=SOLID
,
*Solid Section, elset=CLAD, material=SOLID
,
*Initial Conditions, type=TEMPERATURE
ALL, 600
*Surface Interaction, name=INTERFACE
*Surface Behavior, pressure-overclosure=LINEAR
1e12
*Friction
0.2
*Gap Heat Generation
0
*Gap Conductance, pressure
1000, 0
*Gap Conductance
1000, 0
1000, 1
*Contact Pair, interaction=INTERFACE, type=NODE TO SURFACE, adjust=0
S_FUEL_RIGHT, S_CLAD_LEFT
*Step, name=CLOSE, nlgeom=YES, inc=10
*Coupled Temperature-Displacement, steady state
1, 1, 1, 1
*Controls, parameters=FIELD, field=DISPLACEMENT
1e-10, 1e-10, , , , 1e-10
*Boundary
1, 1, 1, 0
1, 2, 2, 0
1, 11, 11, 600
2, 1, 1, 0.000167
2, 2, 2, 0
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138, 2, 2, 0
*Output, field, frequency=1
*Node Output
NT, U, RF, RFL
*Element Output, directions=YES
S, EE, COORD, IVOL, HFL
*Contact Output
CSTRESS, CDISP, CFORCE, HFL
*Output, history, frequency=0
*End Step
*Step, name=SLIDE, nlgeom=YES, inc=10
*Coupled Temperature-Displacement, steady state
1, 1, 1, 1
*Controls, parameters=FIELD, field=DISPLACEMENT
1e-10, 1e-10, , , , 1e-10
*Boundary
1, 1, 1, 0
1, 2, 2, 0.00001
1, 11, 11, 600
2, 1, 1, 0.000167
2, 2, 2, 0.00001
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138, 2, 2, 0
*Output, field, frequency=1
*Node Output
NT, U, RF, RFL
*Element Output, directions=YES
S, EE, COORD, IVOL, HFL
*Contact Output
CSTRESS, CDISP, CFORCE, HFL
*Output, history, frequency=0
*End Step
*Step, name=CURVE, nlgeom=YES, inc=10
*Coupled Temperature-Displacement, steady state
1, 1, 1, 1
*Controls, parameters=FIELD, field=DISPLACEMENT
1e-10, 1e-10, , , , 1e-10
*Boundary
1, 1, 1, 0
2, 1, 1, 0.000167
3, 1, 1, 0.000195125
4, 1, 1, 0.000028125000000000003
5, 1, 1, 0.000334
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138, 1, 1, 0.0011504002
*Output, field, frequency=1
*Node Output
NT, U, RF, RFL
*Element Output, directions=YES
S, EE, COORD, IVOL, HFL
*Contact Output
CSTRESS, CDISP, CFORCE, HFL
*Output, history, frequency=0
*End Step
*Step, name=ENDPOINT, nlgeom=YES, inc=10
*Coupled Temperature-Displacement, steady state
1, 1, 1, 1
*Controls, parameters=FIELD, field=DISPLACEMENT
1e-10, 1e-10, , , , 1e-10
*Boundary
1, 2, 2, -1e-5
2, 2, 2, -1e-5
3, 2, 2, -1e-5
4, 2, 2, -1e-5
5, 2, 2, -1e-5
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111, 2, 2, -1e-5
*Output, field, frequency=1
*Node Output
NT, U, RF, RFL
*Element Output, directions=YES
S, EE, COORD, IVOL, HFL
*Contact Output
CSTRESS, CDISP, CFORCE, HFL
*Output, history, frequency=0
*End Step
