*Heading
** Abaqus 2025 density/capacity identification; explicit complete input.
** All nodal fields prescribed; k=1e-20, alpha=0. One thermal basis per disconnected element.
** Steps: reference, deformation A, hold A, deformation B, return reference.
*Preprint, echo=NO, model=NO, history=NO, contact=NO
*Node
1, 0, 0, 3
2, 0.54000000000000004, 0, 2.98
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*Element, type=C3D8T, elset=E1
1, 1, 2, 3, 4, 5, 6, 7, 8
*Solid Section, elset=E1, material=CONSTANT
,
*Element, type=C3D8T, elset=E2
2, 9, 10, 11, 12, 13, 14, 15, 16
*Solid Section, elset=E2, material=CONSTANT
,
*Element, type=C3D8T, elset=E3
3, 17, 18, 19, 20, 21, 22, 23, 24
*Solid Section, elset=E3, material=CONSTANT
,
*Element, type=C3D8T, elset=E4
4, 25, 26, 27, 28, 29, 30, 31, 32
*Solid Section, elset=E4, material=CONSTANT
,
*Element, type=C3D8T, elset=E5
5, 33, 34, 35, 36, 37, 38, 39, 40
*Solid Section, elset=E5, material=CONSTANT
,
*Element, type=C3D8T, elset=E6
6, 41, 42, 43, 44, 45, 46, 47, 48
*Solid Section, elset=E6, material=CONSTANT
,
*Element, type=C3D8T, elset=E7
7, 49, 50, 51, 52, 53, 54, 55, 56
*Solid Section, elset=E7, material=CONSTANT
,
*Element, type=C3D8T, elset=E8
8, 57, 58, 59, 60, 61, 62, 63, 64
*Solid Section, elset=E8, material=CONSTANT
,
*Element, type=C3D8T, elset=E9
9, 65, 66, 67, 68, 69, 70, 71, 72
*Solid Section, elset=E9, material=DENSITY
,
*Element, type=C3D8T, elset=E10
10, 73, 74, 75, 76, 77, 78, 79, 80
*Solid Section, elset=E10, material=DENSITY
,
*Element, type=C3D8T, elset=E11
11, 81, 82, 83, 84, 85, 86, 87, 88
*Solid Section, elset=E11, material=DENSITY
,
*Element, type=C3D8T, elset=E12
12, 89, 90, 91, 92, 93, 94, 95, 96
*Solid Section, elset=E12, material=DENSITY
,
*Element, type=C3D8T, elset=E13
13, 97, 98, 99, 100, 101, 102, 103, 104
*Solid Section, elset=E13, material=DENSITY
,
*Element, type=C3D8T, elset=E14
14, 105, 106, 107, 108, 109, 110, 111, 112
*Solid Section, elset=E14, material=DENSITY
,
*Element, type=C3D8T, elset=E15
15, 113, 114, 115, 116, 117, 118, 119, 120
*Solid Section, elset=E15, material=DENSITY
,
*Element, type=C3D8T, elset=E16
16, 121, 122, 123, 124, 125, 126, 127, 128
*Solid Section, elset=E16, material=DENSITY
,
*Element, type=C3D8T, elset=E17
17, 129, 130, 131, 132, 133, 134, 135, 136
*Solid Section, elset=E17, material=DENSITY_CP
,
*Element, type=C3D8T, elset=E18
18, 137, 138, 139, 140, 141, 142, 143, 144
*Solid Section, elset=E18, material=DENSITY_CP
,
*Element, type=C3D8T, elset=E19
19, 145, 146, 147, 148, 149, 150, 151, 152
*Solid Section, elset=E19, material=DENSITY_CP
,
*Element, type=C3D8T, elset=E20
20, 153, 154, 155, 156, 157, 158, 159, 160
*Solid Section, elset=E20, material=DENSITY_CP
,
*Element, type=C3D8T, elset=E21
21, 161, 162, 163, 164, 165, 166, 167, 168
*Solid Section, elset=E21, material=DENSITY_CP
,
*Element, type=C3D8T, elset=E22
22, 169, 170, 171, 172, 173, 174, 175, 176
*Solid Section, elset=E22, material=DENSITY_CP
,
*Element, type=C3D8T, elset=E23
23, 177, 178, 179, 180, 181, 182, 183, 184
*Solid Section, elset=E23, material=DENSITY_CP
,
*Element, type=C3D8T, elset=E24
24, 185, 186, 187, 188, 189, 190, 191, 192
*Solid Section, elset=E24, material=DENSITY_CP
,
*Element, type=C3D8T, elset=E25
25, 193, 194, 195, 196, 197, 198, 199, 200
*Solid Section, elset=E25, material=CONSTANT
,
*Element, type=C3D8T, elset=E26
26, 201, 202, 203, 204, 205, 206, 207, 208
*Solid Section, elset=E26, material=CONSTANT
,
*Element, type=C3D8T, elset=E27
27, 209, 210, 211, 212, 213, 214, 215, 216
*Solid Section, elset=E27, material=CONSTANT
,
*Element, type=C3D8T, elset=E28
28, 217, 218, 219, 220, 221, 222, 223, 224
*Solid Section, elset=E28, material=CONSTANT
,
*Element, type=C3D8T, elset=E29
29, 225, 226, 227, 228, 229, 230, 231, 232
*Solid Section, elset=E29, material=CONSTANT
,
*Element, type=C3D8T, elset=E30
30, 233, 234, 235, 236, 237, 238, 239, 240
*Solid Section, elset=E30, material=CONSTANT
,
*Element, type=C3D8T, elset=E31
31, 241, 242, 243, 244, 245, 246, 247, 248
*Solid Section, elset=E31, material=CONSTANT
,
*Element, type=C3D8T, elset=E32
32, 249, 250, 251, 252, 253, 254, 255, 256
*Solid Section, elset=E32, material=CONSTANT
,
*Element, type=C3D8T, elset=E33
33, 257, 258, 259, 260, 261, 262, 263, 264
*Solid Section, elset=E33, material=DENSITY
,
*Element, type=C3D8T, elset=E34
34, 265, 266, 267, 268, 269, 270, 271, 272
*Solid Section, elset=E34, material=DENSITY
,
*Element, type=C3D8T, elset=E35
35, 273, 274, 275, 276, 277, 278, 279, 280
*Solid Section, elset=E35, material=DENSITY
,
*Element, type=C3D8T, elset=E36
36, 281, 282, 283, 284, 285, 286, 287, 288
*Solid Section, elset=E36, material=DENSITY
,
*Element, type=C3D8T, elset=E37
37, 289, 290, 291, 292, 293, 294, 295, 296
*Solid Section, elset=E37, material=DENSITY
,
*Element, type=C3D8T, elset=E38
38, 297, 298, 299, 300, 301, 302, 303, 304
*Solid Section, elset=E38, material=DENSITY
,
*Element, type=C3D8T, elset=E39
39, 305, 306, 307, 308, 309, 310, 311, 312
*Solid Section, elset=E39, material=DENSITY
,
*Element, type=C3D8T, elset=E40
40, 313, 314, 315, 316, 317, 318, 319, 320
*Solid Section, elset=E40, material=DENSITY
,
*Element, type=C3D8T, elset=E41
41, 321, 322, 323, 324, 325, 326, 327, 328
*Solid Section, elset=E41, material=DENSITY_CP
,
*Element, type=C3D8T, elset=E42
42, 329, 330, 331, 332, 333, 334, 335, 336
*Solid Section, elset=E42, material=DENSITY_CP
,
*Element, type=C3D8T, elset=E43
43, 337, 338, 339, 340, 341, 342, 343, 344
*Solid Section, elset=E43, material=DENSITY_CP
,
*Element, type=C3D8T, elset=E44
44, 345, 346, 347, 348, 349, 350, 351, 352
*Solid Section, elset=E44, material=DENSITY_CP
,
*Element, type=C3D8T, elset=E45
45, 353, 354, 355, 356, 357, 358, 359, 360
*Solid Section, elset=E45, material=DENSITY_CP
,
*Element, type=C3D8T, elset=E46
46, 361, 362, 363, 364, 365, 366, 367, 368
*Solid Section, elset=E46, material=DENSITY_CP
,
*Element, type=C3D8T, elset=E47
47, 369, 370, 371, 372, 373, 374, 375, 376
*Solid Section, elset=E47, material=DENSITY_CP
,
*Element, type=C3D8T, elset=E48
48, 377, 378, 379, 380, 381, 382, 383, 384
*Solid Section, elset=E48, material=DENSITY_CP
,
*Element, type=C3D8RT, elset=E49
49, 385, 386, 387, 388, 389, 390, 391, 392
*Solid Section, elset=E49, material=CONSTANT
,
*Element, type=C3D8RT, elset=E50
50, 393, 394, 395, 396, 397, 398, 399, 400
*Solid Section, elset=E50, material=CONSTANT
,
*Element, type=C3D8RT, elset=E51
51, 401, 402, 403, 404, 405, 406, 407, 408
*Solid Section, elset=E51, material=CONSTANT
,
*Element, type=C3D8RT, elset=E52
52, 409, 410, 411, 412, 413, 414, 415, 416
*Solid Section, elset=E52, material=CONSTANT
,
*Element, type=C3D8RT, elset=E53
53, 417, 418, 419, 420, 421, 422, 423, 424
*Solid Section, elset=E53, material=CONSTANT
,
*Element, type=C3D8RT, elset=E54
54, 425, 426, 427, 428, 429, 430, 431, 432
*Solid Section, elset=E54, material=CONSTANT
,
*Element, type=C3D8RT, elset=E55
55, 433, 434, 435, 436, 437, 438, 439, 440
*Solid Section, elset=E55, material=CONSTANT
,
*Element, type=C3D8RT, elset=E56
56, 441, 442, 443, 444, 445, 446, 447, 448
*Solid Section, elset=E56, material=CONSTANT
,
*Element, type=C3D8RT, elset=E57
57, 449, 450, 451, 452, 453, 454, 455, 456
*Solid Section, elset=E57, material=DENSITY
,
*Element, type=C3D8RT, elset=E58
58, 457, 458, 459, 460, 461, 462, 463, 464
*Solid Section, elset=E58, material=DENSITY
,
*Element, type=C3D8RT, elset=E59
59, 465, 466, 467, 468, 469, 470, 471, 472
*Solid Section, elset=E59, material=DENSITY
,
*Element, type=C3D8RT, elset=E60
60, 473, 474, 475, 476, 477, 478, 479, 480
*Solid Section, elset=E60, material=DENSITY
,
*Element, type=C3D8RT, elset=E61
61, 481, 482, 483, 484, 485, 486, 487, 488
*Solid Section, elset=E61, material=DENSITY
,
*Element, type=C3D8RT, elset=E62
62, 489, 490, 491, 492, 493, 494, 495, 496
*Solid Section, elset=E62, material=DENSITY
,
*Element, type=C3D8RT, elset=E63
63, 497, 498, 499, 500, 501, 502, 503, 504
*Solid Section, elset=E63, material=DENSITY
,
*Element, type=C3D8RT, elset=E64
64, 505, 506, 507, 508, 509, 510, 511, 512
*Solid Section, elset=E64, material=DENSITY
,
*Element, type=C3D8RT, elset=E65
65, 513, 514, 515, 516, 517, 518, 519, 520
*Solid Section, elset=E65, material=DENSITY_CP
,
*Element, type=C3D8RT, elset=E66
66, 521, 522, 523, 524, 525, 526, 527, 528
*Solid Section, elset=E66, material=DENSITY_CP
,
*Element, type=C3D8RT, elset=E67
67, 529, 530, 531, 532, 533, 534, 535, 536
*Solid Section, elset=E67, material=DENSITY_CP
,
*Element, type=C3D8RT, elset=E68
68, 537, 538, 539, 540, 541, 542, 543, 544
*Solid Section, elset=E68, material=DENSITY_CP
,
*Element, type=C3D8RT, elset=E69
69, 545, 546, 547, 548, 549, 550, 551, 552
*Solid Section, elset=E69, material=DENSITY_CP
,
*Element, type=C3D8RT, elset=E70
70, 553, 554, 555, 556, 557, 558, 559, 560
*Solid Section, elset=E70, material=DENSITY_CP
,
*Element, type=C3D8RT, elset=E71
71, 561, 562, 563, 564, 565, 566, 567, 568
*Solid Section, elset=E71, material=DENSITY_CP
,
*Element, type=C3D8RT, elset=E72
72, 569, 570, 571, 572, 573, 574, 575, 576
*Solid Section, elset=E72, material=DENSITY_CP
,
*Element, type=C3D8RT, elset=E73
73, 577, 578, 579, 580, 581, 582, 583, 584
*Solid Section, elset=E73, material=CONSTANT
,
*Element, type=C3D8RT, elset=E74
74, 585, 586, 587, 588, 589, 590, 591, 592
*Solid Section, elset=E74, material=CONSTANT
,
*Element, type=C3D8RT, elset=E75
75, 593, 594, 595, 596, 597, 598, 599, 600
*Solid Section, elset=E75, material=CONSTANT
,
*Element, type=C3D8RT, elset=E76
76, 601, 602, 603, 604, 605, 606, 607, 608
*Solid Section, elset=E76, material=CONSTANT
,
*Element, type=C3D8RT, elset=E77
77, 609, 610, 611, 612, 613, 614, 615, 616
*Solid Section, elset=E77, material=CONSTANT
,
*Element, type=C3D8RT, elset=E78
78, 617, 618, 619, 620, 621, 622, 623, 624
*Solid Section, elset=E78, material=CONSTANT
,
*Element, type=C3D8RT, elset=E79
79, 625, 626, 627, 628, 629, 630, 631, 632
*Solid Section, elset=E79, material=CONSTANT
,
*Element, type=C3D8RT, elset=E80
80, 633, 634, 635, 636, 637, 638, 639, 640
*Solid Section, elset=E80, material=CONSTANT
,
*Element, type=C3D8RT, elset=E81
81, 641, 642, 643, 644, 645, 646, 647, 648
*Solid Section, elset=E81, material=DENSITY
,
*Element, type=C3D8RT, elset=E82
82, 649, 650, 651, 652, 653, 654, 655, 656
*Solid Section, elset=E82, material=DENSITY
,
*Element, type=C3D8RT, elset=E83
83, 657, 658, 659, 660, 661, 662, 663, 664
*Solid Section, elset=E83, material=DENSITY
,
*Element, type=C3D8RT, elset=E84
84, 665, 666, 667, 668, 669, 670, 671, 672
*Solid Section, elset=E84, material=DENSITY
,
*Element, type=C3D8RT, elset=E85
85, 673, 674, 675, 676, 677, 678, 679, 680
*Solid Section, elset=E85, material=DENSITY
,
*Element, type=C3D8RT, elset=E86
86, 681, 682, 683, 684, 685, 686, 687, 688
*Solid Section, elset=E86, material=DENSITY
,
*Element, type=C3D8RT, elset=E87
87, 689, 690, 691, 692, 693, 694, 695, 696
*Solid Section, elset=E87, material=DENSITY
,
*Element, type=C3D8RT, elset=E88
88, 697, 698, 699, 700, 701, 702, 703, 704
*Solid Section, elset=E88, material=DENSITY
,
*Element, type=C3D8RT, elset=E89
89, 705, 706, 707, 708, 709, 710, 711, 712
*Solid Section, elset=E89, material=DENSITY_CP
,
*Element, type=C3D8RT, elset=E90
90, 713, 714, 715, 716, 717, 718, 719, 720
*Solid Section, elset=E90, material=DENSITY_CP
,
*Element, type=C3D8RT, elset=E91
91, 721, 722, 723, 724, 725, 726, 727, 728
*Solid Section, elset=E91, material=DENSITY_CP
,
*Element, type=C3D8RT, elset=E92
92, 729, 730, 731, 732, 733, 734, 735, 736
*Solid Section, elset=E92, material=DENSITY_CP
,
*Element, type=C3D8RT, elset=E93
93, 737, 738, 739, 740, 741, 742, 743, 744
*Solid Section, elset=E93, material=DENSITY_CP
,
*Element, type=C3D8RT, elset=E94
94, 745, 746, 747, 748, 749, 750, 751, 752
*Solid Section, elset=E94, material=DENSITY_CP
,
*Element, type=C3D8RT, elset=E95
95, 753, 754, 755, 756, 757, 758, 759, 760
*Solid Section, elset=E95, material=DENSITY_CP
,
*Element, type=C3D8RT, elset=E96
96, 761, 762, 763, 764, 765, 766, 767, 768
*Solid Section, elset=E96, material=DENSITY_CP
,
*Element, type=CAX4T, elset=E97
97, 769, 770, 771, 772
*Solid Section, elset=E97, material=CONSTANT
,
*Element, type=CAX4T, elset=E98
98, 773, 774, 775, 776
*Solid Section, elset=E98, material=CONSTANT
,
*Element, type=CAX4T, elset=E99
99, 777, 778, 779, 780
*Solid Section, elset=E99, material=CONSTANT
,
*Element, type=CAX4T, elset=E100
100, 781, 782, 783, 784
*Solid Section, elset=E100, material=CONSTANT
,
*Element, type=CAX4T, elset=E101
101, 785, 786, 787, 788
*Solid Section, elset=E101, material=DENSITY
,
*Element, type=CAX4T, elset=E102
102, 789, 790, 791, 792
*Solid Section, elset=E102, material=DENSITY
,
*Element, type=CAX4T, elset=E103
103, 793, 794, 795, 796
*Solid Section, elset=E103, material=DENSITY
,
*Element, type=CAX4T, elset=E104
104, 797, 798, 799, 800
*Solid Section, elset=E104, material=DENSITY
,
*Element, type=CAX4T, elset=E105
105, 801, 802, 803, 804
*Solid Section, elset=E105, material=DENSITY_CP
,
*Element, type=CAX4T, elset=E106
106, 805, 806, 807, 808
*Solid Section, elset=E106, material=DENSITY_CP
,
*Element, type=CAX4T, elset=E107
107, 809, 810, 811, 812
*Solid Section, elset=E107, material=DENSITY_CP
,
*Element, type=CAX4T, elset=E108
108, 813, 814, 815, 816
*Solid Section, elset=E108, material=DENSITY_CP
,
*Element, type=CAX4T, elset=E109
109, 817, 818, 819, 820
*Solid Section, elset=E109, material=CONSTANT
,
*Element, type=CAX4T, elset=E110
110, 821, 822, 823, 824
*Solid Section, elset=E110, material=CONSTANT
,
*Element, type=CAX4T, elset=E111
111, 825, 826, 827, 828
*Solid Section, elset=E111, material=CONSTANT
,
*Element, type=CAX4T, elset=E112
112, 829, 830, 831, 832
*Solid Section, elset=E112, material=CONSTANT
,
*Element, type=CAX4T, elset=E113
113, 833, 834, 835, 836
*Solid Section, elset=E113, material=DENSITY
,
*Element, type=CAX4T, elset=E114
114, 837, 838, 839, 840
*Solid Section, elset=E114, material=DENSITY
,
*Element, type=CAX4T, elset=E115
115, 841, 842, 843, 844
*Solid Section, elset=E115, material=DENSITY
,
*Element, type=CAX4T, elset=E116
116, 845, 846, 847, 848
*Solid Section, elset=E116, material=DENSITY
,
*Element, type=CAX4T, elset=E117
117, 849, 850, 851, 852
*Solid Section, elset=E117, material=DENSITY_CP
,
*Element, type=CAX4T, elset=E118
118, 853, 854, 855, 856
*Solid Section, elset=E118, material=DENSITY_CP
,
*Element, type=CAX4T, elset=E119
119, 857, 858, 859, 860
*Solid Section, elset=E119, material=DENSITY_CP
,
*Element, type=CAX4T, elset=E120
120, 861, 862, 863, 864
*Solid Section, elset=E120, material=DENSITY_CP
,
*Element, type=CAX4RT, elset=E121
121, 865, 866, 867, 868
*Solid Section, elset=E121, material=CONSTANT
,
*Element, type=CAX4RT, elset=E122
122, 869, 870, 871, 872
*Solid Section, elset=E122, material=CONSTANT
,
*Element, type=CAX4RT, elset=E123
123, 873, 874, 875, 876
*Solid Section, elset=E123, material=CONSTANT
,
*Element, type=CAX4RT, elset=E124
124, 877, 878, 879, 880
*Solid Section, elset=E124, material=CONSTANT
,
*Element, type=CAX4RT, elset=E125
125, 881, 882, 883, 884
*Solid Section, elset=E125, material=DENSITY
,
*Element, type=CAX4RT, elset=E126
126, 885, 886, 887, 888
*Solid Section, elset=E126, material=DENSITY
,
*Element, type=CAX4RT, elset=E127
127, 889, 890, 891, 892
*Solid Section, elset=E127, material=DENSITY
,
*Element, type=CAX4RT, elset=E128
128, 893, 894, 895, 896
*Solid Section, elset=E128, material=DENSITY
,
*Element, type=CAX4RT, elset=E129
129, 897, 898, 899, 900
*Solid Section, elset=E129, material=DENSITY_CP
,
*Element, type=CAX4RT, elset=E130
130, 901, 902, 903, 904
*Solid Section, elset=E130, material=DENSITY_CP
,
*Element, type=CAX4RT, elset=E131
131, 905, 906, 907, 908
*Solid Section, elset=E131, material=DENSITY_CP
,
*Element, type=CAX4RT, elset=E132
132, 909, 910, 911, 912
*Solid Section, elset=E132, material=DENSITY_CP
,
*Element, type=CAX4RT, elset=E133
133, 913, 914, 915, 916
*Solid Section, elset=E133, material=CONSTANT
,
*Element, type=CAX4RT, elset=E134
134, 917, 918, 919, 920
*Solid Section, elset=E134, material=CONSTANT
,
*Element, type=CAX4RT, elset=E135
135, 921, 922, 923, 924
*Solid Section, elset=E135, material=CONSTANT
,
*Element, type=CAX4RT, elset=E136
136, 925, 926, 927, 928
*Solid Section, elset=E136, material=CONSTANT
,
*Element, type=CAX4RT, elset=E137
137, 929, 930, 931, 932
*Solid Section, elset=E137, material=DENSITY
,
*Element, type=CAX4RT, elset=E138
138, 933, 934, 935, 936
*Solid Section, elset=E138, material=DENSITY
,
*Element, type=CAX4RT, elset=E139
139, 937, 938, 939, 940
*Solid Section, elset=E139, material=DENSITY
,
*Element, type=CAX4RT, elset=E140
140, 941, 942, 943, 944
*Solid Section, elset=E140, material=DENSITY
,
*Element, type=CAX4RT, elset=E141
141, 945, 946, 947, 948
*Solid Section, elset=E141, material=DENSITY_CP
,
*Element, type=CAX4RT, elset=E142
142, 949, 950, 951, 952
*Solid Section, elset=E142, material=DENSITY_CP
,
*Element, type=CAX4RT, elset=E143
143, 953, 954, 955, 956
*Solid Section, elset=E143, material=DENSITY_CP
,
*Element, type=CAX4RT, elset=E144
144, 957, 958, 959, 960
*Solid Section, elset=E144, material=DENSITY_CP
,
*Material, name=CONSTANT
*Elastic
1e6, .25
*Expansion
0.0
*Conductivity
1e-20
*Density
2000.0
*Specific Heat
3000
*Material, name=DENSITY
*Elastic
1e6, .25
*Expansion
0.0
*Conductivity
1e-20
*Density
2000, 300
1900, 360
1400, 420
1300, 480
*Specific Heat
3000
*Material, name=DENSITY_CP
*Elastic
1e6, .25
*Expansion
0.0
*Conductivity
1e-20
*Density
2000, 300
1900, 360
1400, 420
1300, 480
*Specific Heat
3000, 300
3720, 480
*Initial Conditions, type=TEMPERATURE
1, 305
2, 305
3, 305
4, 305
5, 305
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960, 465
*Step, name=REFERENCE, nlgeom=YES, inc=1
*Coupled Temperature-Displacement
.25, .25, .25, .25
*Boundary, op=NEW
1, 1, 1, 0
1, 2, 2, 0
1, 3, 3, 0
1, 11, 11, 303
2, 1, 1, 0
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960, 11, 11, 463
*Output, field, frequency=1
*Node Output
NT, RFL, U
*Element Output, position=INTEGRATION POINTS
IVOL, TEMP
*End Step
*Step, name=DEFORM_A, nlgeom=YES, inc=1
*Coupled Temperature-Displacement
.25, .25, .25, .25
*Boundary, op=NEW
1, 1, 1, -0
1, 2, 2, -0
1, 3, 3, -0
1, 11, 11, 301
2, 1, 1, -0.048000000000000001
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960, 11, 11, 461
*Output, field, frequency=1
*Node Output
NT, RFL, U
*Element Output, position=INTEGRATION POINTS
IVOL, TEMP
*End Step
*Step, name=HOLD_A, nlgeom=YES, inc=1
*Coupled Temperature-Displacement
.25, .25, .25, .25
*Boundary, op=NEW
1, 1, 1, -0
1, 2, 2, -0
1, 3, 3, -0
1, 11, 11, 299
2, 1, 1, -0.048000000000000001
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960, 11, 11, 459
*Output, field, frequency=1
*Node Output
NT, RFL, U
*Element Output, position=INTEGRATION POINTS
IVOL, TEMP
*End Step
*Step, name=DEFORM_B, nlgeom=YES, inc=1
*Coupled Temperature-Displacement
.25, .25, .25, .25
*Boundary, op=NEW
1, 1, 1, 0.017000000000000001
1, 2, 2, -0.034000000000000002
1, 3, 3, 0.050999999999999997
1, 11, 11, 297
2, 1, 1, -0.050999999999999997
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960, 11, 11, 457
*Output, field, frequency=1
*Node Output
NT, RFL, U
*Element Output, position=INTEGRATION POINTS
IVOL, TEMP
*End Step
*Step, name=RETURN, nlgeom=YES, inc=1
*Coupled Temperature-Displacement
.25, .25, .25, .25
*Boundary, op=NEW
1, 1, 1, 0
1, 2, 2, 0
1, 3, 3, 0
1, 11, 11, 295
2, 1, 1, 0
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960, 11, 11, 455
*Output, field, frequency=1
*Node Output
NT, RFL, U
*Element Output, position=INTEGRATION POINTS
IVOL, TEMP
*End Step
