*Heading
** B4.4 nonmatching C3D8 finite-sliding partial-contact path with exchanged primary and secondary.
*Preprint, echo=NO, model=NO, history=NO, contact=YES
*Node
1, 0, -0.5, -0.5
2, 1, -0.5, -0.5
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*Element, type=C3D8, elset=PRIMARY
1, 1, 2, 3, 4, 5, 6, 7, 8
2, 4, 3, 9, 10, 8, 7, 11, 12
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*Element, type=C3D8, elset=SECONDARY
17, 51, 52, 53, 54, 55, 56, 57, 58
18, 59, 60, 61, 62, 63, 64, 65, 66
19, 67, 68, 69, 70, 71, 72, 73, 74
20, 75, 76, 77, 78, 79, 80, 81, 82
21, 83, 84, 85, 86, 87, 88, 89, 90
22, 91, 92, 93, 94, 95, 96, 97, 98
*Nset, nset=primary_all
1, 2, 3, 4, 5, 6
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*Nset, nset=secondary_all
51, 52, 53, 54, 55, 56
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*Nset, nset=secondary_contact_nodes
51, 54, 55, 58, 59, 62
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*Nset, nset=primary_patch_nodes
7, 11, 15, 23, 25, 27, 33, 35, 37
*Surface, type=ELEMENT, name=PRIMARY_CONTACT
PRIMARY, S4
*Elset, elset=PRIMARY_PATCH
6,
7,
10,
11,
*Surface, type=ELEMENT, name=PRIMARY_CONTACT_PATCH
PRIMARY_PATCH, S4
*Surface, type=ELEMENT, name=SECONDARY_CONTACT
SECONDARY, S6
*Material, name=ELASTIC
*Elastic
1.e9, 0.0
*Solid Section, elset=PRIMARY, material=ELASTIC
,
*Solid Section, elset=SECONDARY, material=ELASTIC
,
*Surface Interaction, name=CONTACT
*Surface Behavior, pressure-overclosure=LINEAR
1.e7,
*Contact Pair, interaction=CONTACT, type=SURFACE TO SURFACE, adjust=0.
PRIMARY_CONTACT_PATCH, SECONDARY_CONTACT
*Step, name=PARTIAL_ORIGIN, nlgeom=YES, inc=1
*Static
1., 1., 1., 1.
*Boundary, op=NEW
PRIMARY_ALL, 1, 3, 0.
51, 1, 1, -0.005859375
51, 2, 2, 0
51, 3, 3, 0
52, 1, 1, -0.005859375
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98, 3, 3, 0
*Output, field, frequency=1
*Node Output
COORD, RF, U
*Contact Output
CSTRESS, CDISP, CFORCE
*End Step
