*Heading
** B5.22 faceted-cylinder C3D8T pressure-dependent thermal contact.
*Preprint, echo=NO, model=NO, history=NO, contact=YES
*Node
1, 2.9999999999999999e-01, 0.0000000000000000e+00, 0.0000000000000000e+00
2, 5.0000000000000000e-01, 0.0000000000000000e+00, 0.0000000000000000e+00
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*Element, type=C3D8T, elset=PRIMARY
1, 1, 2, 3, 4, 5, 6, 7, 8
2, 4, 3, 9, 10, 8, 7, 11, 12
3, 10, 9, 13, 14, 12, 11, 15, 16
*Element, type=C3D8T, elset=SECONDARY
4, 17, 18, 19, 20, 21, 22, 23, 24
5, 20, 19, 25, 26, 24, 23, 27, 28
6, 26, 25, 29, 30, 28, 27, 31, 32
*Nset, nset=ALL_NODES, generate
1, 32, 1
*Nset, nset=PRIMARY_ALL, generate
1, 16, 1
*Nset, nset=SECONDARY_ALL, generate
17, 32, 1
*Surface, type=ELEMENT, name=PRIMARY_CONTACT
PRIMARY, S4
*Surface, type=ELEMENT, name=SECONDARY_CONTACT
SECONDARY, S6
*Material, name=THERMOELASTIC
*Elastic
1.0000000000000000e9, 0.0
*Expansion, zero=3.0000000000000000e2
0.0
*Conductivity
1.0000000000000000e1
*Density
1.0
*Specific Heat
1.0
*Solid Section, elset=PRIMARY, material=THERMOELASTIC
,
*Solid Section, elset=SECONDARY, material=THERMOELASTIC
,
*Surface Interaction, name=CONTACT
*Surface Behavior, pressure-overclosure=LINEAR
1.0000000000000000e7
*Friction
1.0000000000000001e-1
*Gap Conductance, pressure
0.0000000000000000e0, 0.0000000000000000e0
2.0000000000000000e2, 2.0000000000000000e5
*Contact Pair, interaction=CONTACT, type=SURFACE TO SURFACE, adjust=0.
SECONDARY_CONTACT, PRIMARY_CONTACT
*Initial Conditions, type=TEMPERATURE
PRIMARY_ALL, 3.0000000000000000e2
SECONDARY_ALL, 4.0000000000000000e2
*Step, name=LOAD, nlgeom=YES, inc=20
*Coupled Temperature-Displacement, steady state
1.0, 1.0, 1.0e-8, 1.0
*Boundary, op=NEW
1, 1, 3, 0.0
1, 11, 11, 3.0000000000000000e2
2, 1, 3, 0.0
2, 11, 11, 3.0000000000000000e2
3, 1, 3, 0.0
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32, 11, 11, 4.0000000000000000e2
*Output, field, frequency=1
*Node Output
COORD, NT, RF, RFL, U
*Contact Output
CSTRESS, CDISP, CFORCE, HFL
*End Step
