*Heading
** B5.32 Abaqus/Standard finite-strain C3D8RT complete operator probe: warped.
** Each perturbation uses a disconnected element so every state follows one increment from the reference state.
*Preprint, echo=NO, model=NO, history=NO, contact=NO
*Node
1, 0.0000000000000000e+00, 0.0000000000000000e+00, 0.0000000000000000e+00
2, 1.2000000000000000e+00, 1.0000000000000001e-01, -5.0000000000000003e-02
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*Element, type=C3D8RT, elset=VOLUME
1, 1, 2, 3, 4, 5, 6, 7, 8
2, 9, 10, 11, 12, 13, 14, 15, 16
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*Nset, nset=ALL_NODES, generate
1, 520, 1
*Material, name=THERMOELASTIC
*Elastic
2.0000000000000000e11, 2.5000000000000000e-1
*Expansion, zero=3.0000000000000000e2
1.2000000000000000e-5
*Conductivity
4.0000000000000000e0
*Density
2.0000000000000000e3
*Specific Heat
3.0000000000000000e3
*Solid Section, elset=VOLUME, material=THERMOELASTIC
,
*Initial Conditions, type=TEMPERATURE
ALL_NODES, 3.0000000000000000e2
*Step, name=FINITE_OPERATOR, nlgeom=YES, inc=1
*Coupled Temperature-Displacement, steady state
1.0, 1.0, 1.0e-8, 1.0
*Boundary
1, 11, 11, 3.6000000000000000e+02
1, 1, 1, 0.0000000000000000e+00
1, 2, 2, 0.0000000000000000e+00
1, 3, 3, 0.0000000000000000e+00
2, 11, 11, 4.1000000000000000e+02
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520, 3, 3, 4.3999899999999995e-02
*Output, field, frequency=1
*Node Output
COORD, NT, RF, RFL, U
*Element Output, directions=YES
COORD, HFL, IVOL, LE, S, TEMP
*End Step
