*Heading
** H20.30: quadratic_cylinder curved C3D20 small-sliding surface-to-surface contact.
*Preprint, echo=NO, model=NO, history=NO, contact=YES
*Node
1, 0.9, 0, 0
2, 1, 0, 0
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*Element, type=C3D20, elset=PRIMARY
1, 1, 2, 3, 4, 5, 6, 7, 8, 9, 10, 11, 12, 17, 18, 19, 20, 13, 14, 15, 16
2, 4, 3, 21, 22, 8, 7, 23, 24, 11, 25, 26, 27, 19, 30, 31, 32, 16, 15, 28, 29
3, 22, 21, 33, 34, 24, 23, 35, 36, 26, 37, 38, 39, 31, 42, 43, 44, 29, 28, 40, 41
4, 34, 33, 45, 46, 36, 35, 47, 48, 38, 49, 50, 51, 43, 54, 55, 56, 41, 40, 52, 53
5, 5, 6, 7, 8, 57, 58, 59, 60, 17, 18, 19, 20, 65, 66, 67, 68, 61, 62, 63, 64
6, 8, 7, 23, 24, 60, 59, 69, 70, 19, 30, 31, 32, 67, 73, 74, 75, 64, 63, 71, 72
7, 24, 23, 35, 36, 70, 69, 76, 77, 31, 42, 43, 44, 74, 80, 81, 82, 72, 71, 78, 79
8, 36, 35, 47, 48, 77, 76, 83, 84, 43, 54, 55, 56, 81, 87, 88, 89, 79, 78, 85, 86
*Element, type=C3D20, elset=SECONDARY
9, 90, 91, 92, 93, 94, 95, 96, 97, 98, 99, 100, 101, 106, 107, 108, 109, 102, 103, 104, 105
10, 93, 92, 110, 111, 97, 96, 112, 113, 100, 114, 115, 116, 108, 119, 120, 121, 105, 104, 117, 118
11, 111, 110, 122, 123, 113, 112, 124, 125, 115, 126, 127, 128, 120, 131, 132, 133, 118, 117, 129, 130
12, 123, 122, 134, 135, 125, 124, 136, 137, 127, 138, 139, 140, 132, 143, 144, 145, 130, 129, 141, 142
13, 94, 95, 96, 97, 146, 147, 148, 149, 106, 107, 108, 109, 154, 155, 156, 157, 150, 151, 152, 153
14, 97, 96, 112, 113, 149, 148, 158, 159, 108, 119, 120, 121, 156, 162, 163, 164, 153, 152, 160, 161
15, 113, 112, 124, 125, 159, 158, 165, 166, 120, 131, 132, 133, 163, 169, 170, 171, 161, 160, 167, 168
16, 125, 124, 136, 137, 166, 165, 172, 173, 132, 143, 144, 145, 170, 176, 177, 178, 168, 167, 174, 175
*Nset, nset=primary_inner
1, 4, 5, 8, 12, 13
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*Nset, nset=primary_back
1, 2, 3, 4, 9, 10
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*Nset, nset=secondary_contact_nodes
90, 93, 94, 97, 101, 102
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*Nset, nset=secondary_outer
91, 92, 95, 96, 99, 103
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*Nset, nset=secondary_back
90, 91, 92, 93, 98, 99
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*Nset, nset=secondary_theta_lower
90, 91, 94, 95, 98, 102, 103, 106, 146, 147, 150, 151, 154
*Nset, nset=secondary_theta_upper
134, 135, 136, 137, 139, 141, 142, 144, 172, 173, 174, 175, 177
*Surface, type=ELEMENT, name=PRIMARY_CONTACT
PRIMARY, S4
*Surface, type=ELEMENT, name=SECONDARY_CONTACT
SECONDARY, S6
*Surface, type=ELEMENT, name=SECONDARY_OUTER
SECONDARY, S4
*Material, name=ELASTIC
*Elastic
1.e9, 0.25
*Solid Section, elset=PRIMARY, material=ELASTIC
,
*Solid Section, elset=SECONDARY, material=ELASTIC
,
*Surface Interaction, name=PENALTY_CONTACT
*Surface Behavior, pressure-overclosure=LINEAR
1.e11,
*Contact Pair, interaction=PENALTY_CONTACT, type=SURFACE TO SURFACE, small sliding, adjust=0.
SECONDARY_CONTACT, PRIMARY_CONTACT
*Step, name=LOAD, nlgeom=NO, inc=100
*Static
0.1, 1., 1.e-8, 0.1
*Boundary
primary_inner, 1, 2, 0.
primary_back, 3, 3, 0.
secondary_back, 3, 3, 0.
secondary_theta_lower, 2, 2, 0.
secondary_theta_upper, 1, 1, 0.
*Dsload
SECONDARY_OUTER, P, 10000.
*Output, field, frequency=1
*Node Output
COORD, RF, U
*Contact Output
CSTRESS, CDISP, CFORCE
*End Step
