*Heading
** H20.40 true-quadratic curved HEX20 finite-sliding friction path.
*Preprint, echo=NO, model=NO, history=NO, contact=YES
*Node
1, 0.6363961030678928, -0.6363961030678927, -0.5
2, 0.7071067811865476, -0.7071067811865475, -0.5
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*Element, type=C3D20, elset=PRIMARY
1, 1, 2, 3, 4, 5, 6, 7, 8, 9, 10, 11, 12, 17, 18, 19, 20, 13, 14, 15, 16
2, 4, 3, 21, 22, 8, 7, 23, 24, 11, 25, 26, 27, 19, 30, 31, 32, 16, 15, 28, 29
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*Element, type=C3D20, elset=SECONDARY
17, 201, 202, 203, 204, 205, 206, 207, 208, 209, 210, 211, 212, 217, 218, 219, 220, 213, 214, 215, 216
18, 204, 203, 221, 222, 208, 207, 223, 224, 211, 225, 226, 227, 219, 230, 231, 232, 216, 215, 228, 229
19, 222, 221, 233, 234, 224, 223, 235, 236, 226, 237, 238, 239, 231, 242, 243, 244, 229, 228, 240, 241
20, 234, 233, 245, 246, 236, 235, 247, 248, 238, 249, 250, 251, 243, 254, 255, 256, 241, 240, 252, 253
21, 246, 245, 257, 258, 248, 247, 259, 260, 250, 261, 262, 263, 255, 266, 267, 268, 253, 252, 264, 265
22, 258, 257, 269, 270, 260, 259, 271, 272, 262, 273, 274, 275, 267, 278, 279, 280, 265, 264, 276, 277
23, 270, 269, 281, 282, 272, 271, 283, 284, 274, 285, 286, 287, 279, 290, 291, 292, 277, 276, 288, 289
24, 282, 281, 293, 294, 284, 283, 295, 296, 286, 297, 298, 299, 291, 302, 303, 304, 289, 288, 300, 301
*Nset, nset=primary_all
1, 2, 3, 4, 5, 6
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*Nset, nset=secondary_all
201, 202, 203, 204, 205, 206
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*Nset, nset=secondary_contact_nodes
201, 204, 205, 208, 212, 213
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*Surface, type=ELEMENT, name=PRIMARY_CONTACT
PRIMARY, S4
*Surface, type=ELEMENT, name=SECONDARY_CONTACT
SECONDARY, S6
*Material, name=ELASTIC
*Elastic
1.e9, 0.25
*Solid Section, elset=PRIMARY, material=ELASTIC
,
*Solid Section, elset=SECONDARY, material=ELASTIC
,
*Surface Interaction, name=CONTACT
*Surface Behavior, pressure-overclosure=LINEAR
1.e6,
*Friction, slip tolerance=1.e-4
0.5,
*Contact Pair, interaction=CONTACT, type=SURFACE TO SURFACE, adjust=0.
SECONDARY_CONTACT, PRIMARY_CONTACT
*Step, name=CLOSE, nlgeom=YES, inc=100
*Static
0.025, 1., 1.e-8, 0.025
*Boundary
primary_all, 1, 3, 0.
201, 1, 1, -0.001449516284761421
201, 2, 2, 0.02996550470229317
201, 3, 3, 0.04
202, 1, 1, -0.001494512909862689
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304, 3, 3, 0.04
*Output, field, frequency=1
*Node Output
COORD, RF, U
*Contact Output
CSTRESS, CDISP, CFORCE
*End Step
*Step, name=CROSS, nlgeom=YES, inc=100
*Static
0.025, 1., 1.e-8, 0.025
*Boundary, op=MOD
201, 1, 1, -0.293600325594639
201, 2, 2, 0.7063996744053609
201, 3, 3, 0.3
202, 1, 1, -0.3228896474759841
202, 2, 2, 0.7771103525240158
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304, 3, 3, 0.3
*Output, field, frequency=1
*Node Output
COORD, RF, U
*Contact Output
CSTRESS, CDISP, CFORCE
*End Step
*Step, name=STRADDLE, nlgeom=YES, inc=100
*Static
0.025, 1., 1.e-8, 0.025
*Boundary, op=MOD
201, 1, 1, -0.00581045805447522
201, 2, 2, 0.09791912318923104
201, 3, 3, -0.2
202, 1, 1, -0.006291985387255394
202, 2, 2, 0.1077208372221871
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304, 3, 3, -0.2
*Output, field, frequency=1
*Node Output
COORD, RF, U
*Contact Output
CSTRESS, CDISP, CFORCE
*End Step
*Step, name=RETURN, nlgeom=YES, inc=100
*Static
0.025, 1., 1.e-8, 0.025
*Boundary, op=MOD
201, 1, 1, -0.001000000000000001
201, 2, 2, 0
201, 3, 3, 0.1
202, 1, 1, -0.0009999999999998899
202, 2, 2, 0
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304, 3, 3, 0.1
*Output, field, frequency=1
*Node Output
COORD, RF, U
*Contact Output
CSTRESS, CDISP, CFORCE
*End Step
