*Heading
** small original axisymmetric PCMI path, CAX4T.
*Preprint, echo=NO, model=NO, history=NO, contact=NO
*Include, input=b13_small_cax4t_mesh.inc
*Material, name=FUEL
*Elastic
2e11, 0.316
*Expansion, zero=600
1e-5
*Density
10970
*Specific Heat
300
*Conductivity
8.257999999999999, 500.0
8.254942023190724, 500.2
8.251886490807355, 500.4
8.248833399920095, 500.6
8.245782747603833, 500.8
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2.139600000000000, 2500.0
*Material, name=CLADDING
*Elastic
7.5e10, 0.3
*Density
6500
*Specific Heat
330
*Conductivity
16
*Plastic
4000000, 0
2004000000, 1
*Creep, law=TIME
8e-26, 3, 0
*Solid Section, elset=FUEL, material=FUEL
,
*Solid Section, elset=CLAD, material=CLADDING
,
*Initial Conditions, type=TEMPERATURE
ALL, 600
*Surface Interaction, name=INTERFACE
*Surface Behavior, pressure-overclosure=LINEAR
1e14
*Gap Conductance
400000, 0
400000.00000000006, 0.000001
396039.60396039614, 0.0000010099999999999999
392118.4197627685, 0.0000010200999999999998
388236.0591710579, 0.0000010303009999999997
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0.4, 1
*Contact Pair, interaction=INTERFACE, type=NODE TO SURFACE, adjust=0, smooth=0
S_FUEL_RIGHT, S_CLAD_LEFT
*Amplitude, name=AXIAL_LOADING, time=TOTAL TIME
0, 0, 0.5, 2e-6, 20, 2e-5
*Amplitude, name=POWER, time=TOTAL TIME
0, 0, 20, 1
*Step, name=PRELOAD, nlgeom=NO, inc=1
*Coupled Temperature-Displacement, cetol=1e-4
0.5, 0.5, 0.5, 0.5
*Controls, parameters=FIELD, field=DISPLACEMENT
1e-10, 1e-10, , , , 1e-10
*Controls, parameters=FIELD, field=TEMPERATURE
1e-10, 1e-10, , , , 1e-10
*Boundary
FUEL_LEFT, 1, 1, 0
CLAD_BOTTOM, 2, 2, 0
CLAD_RIGHT, 11, 11, 600
FUEL_BOTTOM, 2, 2, 0
*Boundary, amplitude=AXIAL_LOADING
CLAD_TOP, 2, 2, 1
*Dflux, amplitude=POWER
FUEL, BF, 2e8
*Output, field, frequency=1
*Node Output
NT, U, RF, RFL
*Element Output, directions=YES
S, EE, PE, PEEQ, CE, CEEQ, COORD, IVOL, HFL
*Contact Output
CSTRESS, CDISP, CFORCE, HFL
*Output, history, frequency=0
*End Step
*Step, name=PCMI, nlgeom=NO, inc=20
*Coupled Temperature-Displacement, cetol=1e-4
1, 19.5, 1, 1
*Controls, parameters=FIELD, field=DISPLACEMENT
1e-10, 1e-10, , , , 1e-10
*Controls, parameters=FIELD, field=TEMPERATURE
1e-10, 1e-10, , , , 1e-10
*Boundary
FUEL_LEFT, 1, 1, 0
CLAD_BOTTOM, 2, 2, 0
CLAD_RIGHT, 11, 11, 600
FUEL_BOTTOM, 2, 2, 0
*Boundary, amplitude=AXIAL_LOADING
CLAD_TOP, 2, 2, 1
*Dflux, amplitude=POWER
FUEL, BF, 2e8
*Output, field, frequency=1
*Node Output
NT, U, RF, RFL
*Element Output, directions=YES
S, EE, PE, PEEQ, CE, CEEQ, COORD, IVOL, HFL
*Contact Output
CSTRESS, CDISP, CFORCE, HFL
*Output, history, frequency=0
*End Step
