*Heading
** B4.4 C3D8 finite-sliding stepped-primary averaging-operator probe.
*Preprint, echo=NO, model=NO, history=NO, contact=YES
*Node
1, 0, -0.5, -0.5
2, 1, -0.5, -0.5
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*Element, type=C3D8, elset=PRIMARY
1, 1, 2, 3, 4, 5, 6, 7, 8
2, 4, 3, 9, 10, 8, 7, 11, 12
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*Element, type=C3D8, elset=SECONDARY
17, 51, 52, 53, 54, 55, 56, 57, 58
18, 59, 60, 61, 62, 63, 64, 65, 66
19, 67, 68, 69, 70, 71, 72, 73, 74
20, 75, 76, 77, 78, 79, 80, 81, 82
21, 83, 84, 85, 86, 87, 88, 89, 90
22, 91, 92, 93, 94, 95, 96, 97, 98
*Nset, nset=primary_all
1, 2, 3, 4, 5, 6
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*Nset, nset=secondary_all
51, 52, 53, 54, 55, 56
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*Nset, nset=secondary_contact_nodes
51, 54, 55, 58, 59, 62
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*Nset, nset=primary_patch_nodes
7, 11, 15, 23, 25, 27, 33, 35, 37
*Surface, type=ELEMENT, name=PRIMARY_CONTACT
PRIMARY, S4
*Elset, elset=PRIMARY_PATCH
6,
7,
10,
11,
*Surface, type=ELEMENT, name=PRIMARY_CONTACT_PATCH
PRIMARY_PATCH, S4
*Surface, type=ELEMENT, name=SECONDARY_CONTACT
SECONDARY, S6
*Material, name=ELASTIC
*Elastic
1.e9, 0.0
*Solid Section, elset=PRIMARY, material=ELASTIC
,
*Solid Section, elset=SECONDARY, material=ELASTIC
,
*Surface Interaction, name=CONTACT
*Surface Behavior, pressure-overclosure=LINEAR
1.e7,
*Contact Pair, interaction=CONTACT, type=SURFACE TO SURFACE, adjust=0.
PRIMARY_CONTACT_PATCH, SECONDARY_CONTACT
*Nset, nset=TILE_1
51, 52, 53, 54, 55, 56, 57, 58
*Nset, nset=TILE_2
59, 60, 61, 62, 63, 64, 65, 66
*Nset, nset=TILE_3
67, 68, 69, 70, 71, 72, 73, 74
*Nset, nset=TILE_4
75, 76, 77, 78, 79, 80, 81, 82
*Nset, nset=TILE_5
83, 84, 85, 86, 87, 88, 89, 90
*Nset, nset=TILE_6
91, 92, 93, 94, 95, 96, 97, 98
*Nset, nset=PATCH_NONCONTACT
1, 2, 3, 4, 5, 6
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*Step, name=BASE, nlgeom=YES, inc=1
*Static
1., 1., 1., 1.
*Boundary, op=NEW
PRIMARY_ALL, 2, 3, 0.
PATCH_NONCONTACT, 1, 1, 0.
SECONDARY_ALL, 2, 3, 0.
7, 1, 1, 0
11, 1, 1, 0
15, 1, 1, 0
23, 1, 1, 0
25, 1, 1, 0
27, 1, 1, 0
33, 1, 1, 0
35, 1, 1, 0
37, 1, 1, 0
TILE_1, 1, 1, -0.015625
TILE_2, 1, 1, -0.015625
TILE_3, 1, 1, -0.015625
TILE_4, 1, 1, -0.015625
TILE_5, 1, 1, -0.015625
TILE_6, 1, 1, -0.015625
*Output, field, frequency=1
*Node Output
COORD, RF, U
*Contact Output
CSTRESS, CDISP, CFORCE
*End Step
*Step, name=T1_PLUS, nlgeom=YES, inc=1
*Static
1., 1., 1., 1.
*Boundary, op=NEW
PRIMARY_ALL, 2, 3, 0.
PATCH_NONCONTACT, 1, 1, 0.
SECONDARY_ALL, 2, 3, 0.
7, 1, 1, 0
11, 1, 1, 0
15, 1, 1, 0
23, 1, 1, 0
25, 1, 1, 0
27, 1, 1, 0
33, 1, 1, 0
35, 1, 1, 0
37, 1, 1, 0
TILE_1, 1, 1, -0.015624
TILE_2, 1, 1, -0.015625
TILE_3, 1, 1, -0.015625
TILE_4, 1, 1, -0.015625
TILE_5, 1, 1, -0.015625
TILE_6, 1, 1, -0.015625
*Output, field, frequency=1
*Node Output
COORD, RF, U
*Contact Output
CSTRESS, CDISP, CFORCE
*End Step
*Step, name=T1_MINUS, nlgeom=YES, inc=1
*Static
1., 1., 1., 1.
*Boundary, op=NEW
PRIMARY_ALL, 2, 3, 0.
PATCH_NONCONTACT, 1, 1, 0.
SECONDARY_ALL, 2, 3, 0.
7, 1, 1, 0
11, 1, 1, 0
15, 1, 1, 0
23, 1, 1, 0
25, 1, 1, 0
27, 1, 1, 0
33, 1, 1, 0
35, 1, 1, 0
37, 1, 1, 0
TILE_1, 1, 1, -0.015626
TILE_2, 1, 1, -0.015625
TILE_3, 1, 1, -0.015625
TILE_4, 1, 1, -0.015625
TILE_5, 1, 1, -0.015625
TILE_6, 1, 1, -0.015625
*Output, field, frequency=1
*Node Output
COORD, RF, U
*Contact Output
CSTRESS, CDISP, CFORCE
*End Step
*Step, name=T2_PLUS, nlgeom=YES, inc=1
*Static
1., 1., 1., 1.
*Boundary, op=NEW
PRIMARY_ALL, 2, 3, 0.
PATCH_NONCONTACT, 1, 1, 0.
SECONDARY_ALL, 2, 3, 0.
7, 1, 1, 0
11, 1, 1, 0
15, 1, 1, 0
23, 1, 1, 0
25, 1, 1, 0
27, 1, 1, 0
33, 1, 1, 0
35, 1, 1, 0
37, 1, 1, 0
TILE_1, 1, 1, -0.015625
TILE_2, 1, 1, -0.015624
TILE_3, 1, 1, -0.015625
TILE_4, 1, 1, -0.015625
TILE_5, 1, 1, -0.015625
TILE_6, 1, 1, -0.015625
*Output, field, frequency=1
*Node Output
COORD, RF, U
*Contact Output
CSTRESS, CDISP, CFORCE
*End Step
*Step, name=T2_MINUS, nlgeom=YES, inc=1
*Static
1., 1., 1., 1.
*Boundary, op=NEW
PRIMARY_ALL, 2, 3, 0.
PATCH_NONCONTACT, 1, 1, 0.
SECONDARY_ALL, 2, 3, 0.
7, 1, 1, 0
11, 1, 1, 0
15, 1, 1, 0
23, 1, 1, 0
25, 1, 1, 0
27, 1, 1, 0
33, 1, 1, 0
35, 1, 1, 0
37, 1, 1, 0
TILE_1, 1, 1, -0.015625
TILE_2, 1, 1, -0.015626
TILE_3, 1, 1, -0.015625
TILE_4, 1, 1, -0.015625
TILE_5, 1, 1, -0.015625
TILE_6, 1, 1, -0.015625
*Output, field, frequency=1
*Node Output
COORD, RF, U
*Contact Output
CSTRESS, CDISP, CFORCE
*End Step
*Step, name=T3_PLUS, nlgeom=YES, inc=1
*Static
1., 1., 1., 1.
*Boundary, op=NEW
PRIMARY_ALL, 2, 3, 0.
PATCH_NONCONTACT, 1, 1, 0.
SECONDARY_ALL, 2, 3, 0.
7, 1, 1, 0
11, 1, 1, 0
15, 1, 1, 0
23, 1, 1, 0
25, 1, 1, 0
27, 1, 1, 0
33, 1, 1, 0
35, 1, 1, 0
37, 1, 1, 0
TILE_1, 1, 1, -0.015625
TILE_2, 1, 1, -0.015625
TILE_3, 1, 1, -0.015624
TILE_4, 1, 1, -0.015625
TILE_5, 1, 1, -0.015625
TILE_6, 1, 1, -0.015625
*Output, field, frequency=1
*Node Output
COORD, RF, U
*Contact Output
CSTRESS, CDISP, CFORCE
*End Step
*Step, name=T3_MINUS, nlgeom=YES, inc=1
*Static
1., 1., 1., 1.
*Boundary, op=NEW
PRIMARY_ALL, 2, 3, 0.
PATCH_NONCONTACT, 1, 1, 0.
SECONDARY_ALL, 2, 3, 0.
7, 1, 1, 0
11, 1, 1, 0
15, 1, 1, 0
23, 1, 1, 0
25, 1, 1, 0
27, 1, 1, 0
33, 1, 1, 0
35, 1, 1, 0
37, 1, 1, 0
TILE_1, 1, 1, -0.015625
TILE_2, 1, 1, -0.015625
TILE_3, 1, 1, -0.015626
TILE_4, 1, 1, -0.015625
TILE_5, 1, 1, -0.015625
TILE_6, 1, 1, -0.015625
*Output, field, frequency=1
*Node Output
COORD, RF, U
*Contact Output
CSTRESS, CDISP, CFORCE
*End Step
*Step, name=T4_PLUS, nlgeom=YES, inc=1
*Static
1., 1., 1., 1.
*Boundary, op=NEW
PRIMARY_ALL, 2, 3, 0.
PATCH_NONCONTACT, 1, 1, 0.
SECONDARY_ALL, 2, 3, 0.
7, 1, 1, 0
11, 1, 1, 0
15, 1, 1, 0
23, 1, 1, 0
25, 1, 1, 0
27, 1, 1, 0
33, 1, 1, 0
35, 1, 1, 0
37, 1, 1, 0
TILE_1, 1, 1, -0.015625
TILE_2, 1, 1, -0.015625
TILE_3, 1, 1, -0.015625
TILE_4, 1, 1, -0.015624
TILE_5, 1, 1, -0.015625
TILE_6, 1, 1, -0.015625
*Output, field, frequency=1
*Node Output
COORD, RF, U
*Contact Output
CSTRESS, CDISP, CFORCE
*End Step
*Step, name=T4_MINUS, nlgeom=YES, inc=1
*Static
1., 1., 1., 1.
*Boundary, op=NEW
PRIMARY_ALL, 2, 3, 0.
PATCH_NONCONTACT, 1, 1, 0.
SECONDARY_ALL, 2, 3, 0.
7, 1, 1, 0
11, 1, 1, 0
15, 1, 1, 0
23, 1, 1, 0
25, 1, 1, 0
27, 1, 1, 0
33, 1, 1, 0
35, 1, 1, 0
37, 1, 1, 0
TILE_1, 1, 1, -0.015625
TILE_2, 1, 1, -0.015625
TILE_3, 1, 1, -0.015625
TILE_4, 1, 1, -0.015626
TILE_5, 1, 1, -0.015625
TILE_6, 1, 1, -0.015625
*Output, field, frequency=1
*Node Output
COORD, RF, U
*Contact Output
CSTRESS, CDISP, CFORCE
*End Step
*Step, name=T5_PLUS, nlgeom=YES, inc=1
*Static
1., 1., 1., 1.
*Boundary, op=NEW
PRIMARY_ALL, 2, 3, 0.
PATCH_NONCONTACT, 1, 1, 0.
SECONDARY_ALL, 2, 3, 0.
7, 1, 1, 0
11, 1, 1, 0
15, 1, 1, 0
23, 1, 1, 0
25, 1, 1, 0
27, 1, 1, 0
33, 1, 1, 0
35, 1, 1, 0
37, 1, 1, 0
TILE_1, 1, 1, -0.015625
TILE_2, 1, 1, -0.015625
TILE_3, 1, 1, -0.015625
TILE_4, 1, 1, -0.015625
TILE_5, 1, 1, -0.015624
TILE_6, 1, 1, -0.015625
*Output, field, frequency=1
*Node Output
COORD, RF, U
*Contact Output
CSTRESS, CDISP, CFORCE
*End Step
*Step, name=T5_MINUS, nlgeom=YES, inc=1
*Static
1., 1., 1., 1.
*Boundary, op=NEW
PRIMARY_ALL, 2, 3, 0.
PATCH_NONCONTACT, 1, 1, 0.
SECONDARY_ALL, 2, 3, 0.
7, 1, 1, 0
11, 1, 1, 0
15, 1, 1, 0
23, 1, 1, 0
25, 1, 1, 0
27, 1, 1, 0
33, 1, 1, 0
35, 1, 1, 0
37, 1, 1, 0
TILE_1, 1, 1, -0.015625
TILE_2, 1, 1, -0.015625
TILE_3, 1, 1, -0.015625
TILE_4, 1, 1, -0.015625
TILE_5, 1, 1, -0.015626
TILE_6, 1, 1, -0.015625
*Output, field, frequency=1
*Node Output
COORD, RF, U
*Contact Output
CSTRESS, CDISP, CFORCE
*End Step
*Step, name=T6_PLUS, nlgeom=YES, inc=1
*Static
1., 1., 1., 1.
*Boundary, op=NEW
PRIMARY_ALL, 2, 3, 0.
PATCH_NONCONTACT, 1, 1, 0.
SECONDARY_ALL, 2, 3, 0.
7, 1, 1, 0
11, 1, 1, 0
15, 1, 1, 0
23, 1, 1, 0
25, 1, 1, 0
27, 1, 1, 0
33, 1, 1, 0
35, 1, 1, 0
37, 1, 1, 0
TILE_1, 1, 1, -0.015625
TILE_2, 1, 1, -0.015625
TILE_3, 1, 1, -0.015625
TILE_4, 1, 1, -0.015625
TILE_5, 1, 1, -0.015625
TILE_6, 1, 1, -0.015624
*Output, field, frequency=1
*Node Output
COORD, RF, U
*Contact Output
CSTRESS, CDISP, CFORCE
*End Step
*Step, name=T6_MINUS, nlgeom=YES, inc=1
*Static
1., 1., 1., 1.
*Boundary, op=NEW
PRIMARY_ALL, 2, 3, 0.
PATCH_NONCONTACT, 1, 1, 0.
SECONDARY_ALL, 2, 3, 0.
7, 1, 1, 0
11, 1, 1, 0
15, 1, 1, 0
23, 1, 1, 0
25, 1, 1, 0
27, 1, 1, 0
33, 1, 1, 0
35, 1, 1, 0
37, 1, 1, 0
TILE_1, 1, 1, -0.015625
TILE_2, 1, 1, -0.015625
TILE_3, 1, 1, -0.015625
TILE_4, 1, 1, -0.015625
TILE_5, 1, 1, -0.015625
TILE_6, 1, 1, -0.015626
*Output, field, frequency=1
*Node Output
COORD, RF, U
*Contact Output
CSTRESS, CDISP, CFORCE
*End Step
*Step, name=S1_PLUS, nlgeom=YES, inc=1
*Static
1., 1., 1., 1.
*Boundary, op=NEW
PRIMARY_ALL, 2, 3, 0.
PATCH_NONCONTACT, 1, 1, 0.
SECONDARY_ALL, 2, 3, 0.
7, 1, 1, 1e-06
11, 1, 1, 0
15, 1, 1, 0
23, 1, 1, 0
25, 1, 1, 0
27, 1, 1, 0
33, 1, 1, 0
35, 1, 1, 0
37, 1, 1, 0
TILE_1, 1, 1, -0.015625
TILE_2, 1, 1, -0.015625
TILE_3, 1, 1, -0.015625
TILE_4, 1, 1, -0.015625
TILE_5, 1, 1, -0.015625
TILE_6, 1, 1, -0.015625
*Output, field, frequency=1
*Node Output
COORD, RF, U
*Contact Output
CSTRESS, CDISP, CFORCE
*End Step
*Step, name=S1_MINUS, nlgeom=YES, inc=1
*Static
1., 1., 1., 1.
*Boundary, op=NEW
PRIMARY_ALL, 2, 3, 0.
PATCH_NONCONTACT, 1, 1, 0.
SECONDARY_ALL, 2, 3, 0.
7, 1, 1, -1e-06
11, 1, 1, 0
15, 1, 1, 0
23, 1, 1, 0
25, 1, 1, 0
27, 1, 1, 0
33, 1, 1, 0
35, 1, 1, 0
37, 1, 1, 0
TILE_1, 1, 1, -0.015625
TILE_2, 1, 1, -0.015625
TILE_3, 1, 1, -0.015625
TILE_4, 1, 1, -0.015625
TILE_5, 1, 1, -0.015625
TILE_6, 1, 1, -0.015625
*Output, field, frequency=1
*Node Output
COORD, RF, U
*Contact Output
CSTRESS, CDISP, CFORCE
*End Step
*Step, name=S2_PLUS, nlgeom=YES, inc=1
*Static
1., 1., 1., 1.
*Boundary, op=NEW
PRIMARY_ALL, 2, 3, 0.
PATCH_NONCONTACT, 1, 1, 0.
SECONDARY_ALL, 2, 3, 0.
7, 1, 1, 0
11, 1, 1, 1e-06
15, 1, 1, 0
23, 1, 1, 0
25, 1, 1, 0
27, 1, 1, 0
33, 1, 1, 0
35, 1, 1, 0
37, 1, 1, 0
TILE_1, 1, 1, -0.015625
TILE_2, 1, 1, -0.015625
TILE_3, 1, 1, -0.015625
TILE_4, 1, 1, -0.015625
TILE_5, 1, 1, -0.015625
TILE_6, 1, 1, -0.015625
*Output, field, frequency=1
*Node Output
COORD, RF, U
*Contact Output
CSTRESS, CDISP, CFORCE
*End Step
*Step, name=S2_MINUS, nlgeom=YES, inc=1
*Static
1., 1., 1., 1.
*Boundary, op=NEW
PRIMARY_ALL, 2, 3, 0.
PATCH_NONCONTACT, 1, 1, 0.
SECONDARY_ALL, 2, 3, 0.
7, 1, 1, 0
11, 1, 1, -1e-06
15, 1, 1, 0
23, 1, 1, 0
25, 1, 1, 0
27, 1, 1, 0
33, 1, 1, 0
35, 1, 1, 0
37, 1, 1, 0
TILE_1, 1, 1, -0.015625
TILE_2, 1, 1, -0.015625
TILE_3, 1, 1, -0.015625
TILE_4, 1, 1, -0.015625
TILE_5, 1, 1, -0.015625
TILE_6, 1, 1, -0.015625
*Output, field, frequency=1
*Node Output
COORD, RF, U
*Contact Output
CSTRESS, CDISP, CFORCE
*End Step
*Step, name=S3_PLUS, nlgeom=YES, inc=1
*Static
1., 1., 1., 1.
*Boundary, op=NEW
PRIMARY_ALL, 2, 3, 0.
PATCH_NONCONTACT, 1, 1, 0.
SECONDARY_ALL, 2, 3, 0.
7, 1, 1, 0
11, 1, 1, 0
15, 1, 1, 1e-06
23, 1, 1, 0
25, 1, 1, 0
27, 1, 1, 0
33, 1, 1, 0
35, 1, 1, 0
37, 1, 1, 0
TILE_1, 1, 1, -0.015625
TILE_2, 1, 1, -0.015625
TILE_3, 1, 1, -0.015625
TILE_4, 1, 1, -0.015625
TILE_5, 1, 1, -0.015625
TILE_6, 1, 1, -0.015625
*Output, field, frequency=1
*Node Output
COORD, RF, U
*Contact Output
CSTRESS, CDISP, CFORCE
*End Step
*Step, name=S3_MINUS, nlgeom=YES, inc=1
*Static
1., 1., 1., 1.
*Boundary, op=NEW
PRIMARY_ALL, 2, 3, 0.
PATCH_NONCONTACT, 1, 1, 0.
SECONDARY_ALL, 2, 3, 0.
7, 1, 1, 0
11, 1, 1, 0
15, 1, 1, -1e-06
23, 1, 1, 0
25, 1, 1, 0
27, 1, 1, 0
33, 1, 1, 0
35, 1, 1, 0
37, 1, 1, 0
TILE_1, 1, 1, -0.015625
TILE_2, 1, 1, -0.015625
TILE_3, 1, 1, -0.015625
TILE_4, 1, 1, -0.015625
TILE_5, 1, 1, -0.015625
TILE_6, 1, 1, -0.015625
*Output, field, frequency=1
*Node Output
COORD, RF, U
*Contact Output
CSTRESS, CDISP, CFORCE
*End Step
*Step, name=S4_PLUS, nlgeom=YES, inc=1
*Static
1., 1., 1., 1.
*Boundary, op=NEW
PRIMARY_ALL, 2, 3, 0.
PATCH_NONCONTACT, 1, 1, 0.
SECONDARY_ALL, 2, 3, 0.
7, 1, 1, 0
11, 1, 1, 0
15, 1, 1, 0
23, 1, 1, 1e-06
25, 1, 1, 0
27, 1, 1, 0
33, 1, 1, 0
35, 1, 1, 0
37, 1, 1, 0
TILE_1, 1, 1, -0.015625
TILE_2, 1, 1, -0.015625
TILE_3, 1, 1, -0.015625
TILE_4, 1, 1, -0.015625
TILE_5, 1, 1, -0.015625
TILE_6, 1, 1, -0.015625
*Output, field, frequency=1
*Node Output
COORD, RF, U
*Contact Output
CSTRESS, CDISP, CFORCE
*End Step
*Step, name=S4_MINUS, nlgeom=YES, inc=1
*Static
1., 1., 1., 1.
*Boundary, op=NEW
PRIMARY_ALL, 2, 3, 0.
PATCH_NONCONTACT, 1, 1, 0.
SECONDARY_ALL, 2, 3, 0.
7, 1, 1, 0
11, 1, 1, 0
15, 1, 1, 0
23, 1, 1, -1e-06
25, 1, 1, 0
27, 1, 1, 0
33, 1, 1, 0
35, 1, 1, 0
37, 1, 1, 0
TILE_1, 1, 1, -0.015625
TILE_2, 1, 1, -0.015625
TILE_3, 1, 1, -0.015625
TILE_4, 1, 1, -0.015625
TILE_5, 1, 1, -0.015625
TILE_6, 1, 1, -0.015625
*Output, field, frequency=1
*Node Output
COORD, RF, U
*Contact Output
CSTRESS, CDISP, CFORCE
*End Step
*Step, name=S5_PLUS, nlgeom=YES, inc=1
*Static
1., 1., 1., 1.
*Boundary, op=NEW
PRIMARY_ALL, 2, 3, 0.
PATCH_NONCONTACT, 1, 1, 0.
SECONDARY_ALL, 2, 3, 0.
7, 1, 1, 0
11, 1, 1, 0
15, 1, 1, 0
23, 1, 1, 0
25, 1, 1, 1e-06
27, 1, 1, 0
33, 1, 1, 0
35, 1, 1, 0
37, 1, 1, 0
TILE_1, 1, 1, -0.015625
TILE_2, 1, 1, -0.015625
TILE_3, 1, 1, -0.015625
TILE_4, 1, 1, -0.015625
TILE_5, 1, 1, -0.015625
TILE_6, 1, 1, -0.015625
*Output, field, frequency=1
*Node Output
COORD, RF, U
*Contact Output
CSTRESS, CDISP, CFORCE
*End Step
*Step, name=S5_MINUS, nlgeom=YES, inc=1
*Static
1., 1., 1., 1.
*Boundary, op=NEW
PRIMARY_ALL, 2, 3, 0.
PATCH_NONCONTACT, 1, 1, 0.
SECONDARY_ALL, 2, 3, 0.
7, 1, 1, 0
11, 1, 1, 0
15, 1, 1, 0
23, 1, 1, 0
25, 1, 1, -1e-06
27, 1, 1, 0
33, 1, 1, 0
35, 1, 1, 0
37, 1, 1, 0
TILE_1, 1, 1, -0.015625
TILE_2, 1, 1, -0.015625
TILE_3, 1, 1, -0.015625
TILE_4, 1, 1, -0.015625
TILE_5, 1, 1, -0.015625
TILE_6, 1, 1, -0.015625
*Output, field, frequency=1
*Node Output
COORD, RF, U
*Contact Output
CSTRESS, CDISP, CFORCE
*End Step
*Step, name=S6_PLUS, nlgeom=YES, inc=1
*Static
1., 1., 1., 1.
*Boundary, op=NEW
PRIMARY_ALL, 2, 3, 0.
PATCH_NONCONTACT, 1, 1, 0.
SECONDARY_ALL, 2, 3, 0.
7, 1, 1, 0
11, 1, 1, 0
15, 1, 1, 0
23, 1, 1, 0
25, 1, 1, 0
27, 1, 1, 1e-06
33, 1, 1, 0
35, 1, 1, 0
37, 1, 1, 0
TILE_1, 1, 1, -0.015625
TILE_2, 1, 1, -0.015625
TILE_3, 1, 1, -0.015625
TILE_4, 1, 1, -0.015625
TILE_5, 1, 1, -0.015625
TILE_6, 1, 1, -0.015625
*Output, field, frequency=1
*Node Output
COORD, RF, U
*Contact Output
CSTRESS, CDISP, CFORCE
*End Step
*Step, name=S6_MINUS, nlgeom=YES, inc=1
*Static
1., 1., 1., 1.
*Boundary, op=NEW
PRIMARY_ALL, 2, 3, 0.
PATCH_NONCONTACT, 1, 1, 0.
SECONDARY_ALL, 2, 3, 0.
7, 1, 1, 0
11, 1, 1, 0
15, 1, 1, 0
23, 1, 1, 0
25, 1, 1, 0
27, 1, 1, -1e-06
33, 1, 1, 0
35, 1, 1, 0
37, 1, 1, 0
TILE_1, 1, 1, -0.015625
TILE_2, 1, 1, -0.015625
TILE_3, 1, 1, -0.015625
TILE_4, 1, 1, -0.015625
TILE_5, 1, 1, -0.015625
TILE_6, 1, 1, -0.015625
*Output, field, frequency=1
*Node Output
COORD, RF, U
*Contact Output
CSTRESS, CDISP, CFORCE
*End Step
*Step, name=S7_PLUS, nlgeom=YES, inc=1
*Static
1., 1., 1., 1.
*Boundary, op=NEW
PRIMARY_ALL, 2, 3, 0.
PATCH_NONCONTACT, 1, 1, 0.
SECONDARY_ALL, 2, 3, 0.
7, 1, 1, 0
11, 1, 1, 0
15, 1, 1, 0
23, 1, 1, 0
25, 1, 1, 0
27, 1, 1, 0
33, 1, 1, 1e-06
35, 1, 1, 0
37, 1, 1, 0
TILE_1, 1, 1, -0.015625
TILE_2, 1, 1, -0.015625
TILE_3, 1, 1, -0.015625
TILE_4, 1, 1, -0.015625
TILE_5, 1, 1, -0.015625
TILE_6, 1, 1, -0.015625
*Output, field, frequency=1
*Node Output
COORD, RF, U
*Contact Output
CSTRESS, CDISP, CFORCE
*End Step
*Step, name=S7_MINUS, nlgeom=YES, inc=1
*Static
1., 1., 1., 1.
*Boundary, op=NEW
PRIMARY_ALL, 2, 3, 0.
PATCH_NONCONTACT, 1, 1, 0.
SECONDARY_ALL, 2, 3, 0.
7, 1, 1, 0
11, 1, 1, 0
15, 1, 1, 0
23, 1, 1, 0
25, 1, 1, 0
27, 1, 1, 0
33, 1, 1, -1e-06
35, 1, 1, 0
37, 1, 1, 0
TILE_1, 1, 1, -0.015625
TILE_2, 1, 1, -0.015625
TILE_3, 1, 1, -0.015625
TILE_4, 1, 1, -0.015625
TILE_5, 1, 1, -0.015625
TILE_6, 1, 1, -0.015625
*Output, field, frequency=1
*Node Output
COORD, RF, U
*Contact Output
CSTRESS, CDISP, CFORCE
*End Step
*Step, name=S8_PLUS, nlgeom=YES, inc=1
*Static
1., 1., 1., 1.
*Boundary, op=NEW
PRIMARY_ALL, 2, 3, 0.
PATCH_NONCONTACT, 1, 1, 0.
SECONDARY_ALL, 2, 3, 0.
7, 1, 1, 0
11, 1, 1, 0
15, 1, 1, 0
23, 1, 1, 0
25, 1, 1, 0
27, 1, 1, 0
33, 1, 1, 0
35, 1, 1, 1e-06
37, 1, 1, 0
TILE_1, 1, 1, -0.015625
TILE_2, 1, 1, -0.015625
TILE_3, 1, 1, -0.015625
TILE_4, 1, 1, -0.015625
TILE_5, 1, 1, -0.015625
TILE_6, 1, 1, -0.015625
*Output, field, frequency=1
*Node Output
COORD, RF, U
*Contact Output
CSTRESS, CDISP, CFORCE
*End Step
*Step, name=S8_MINUS, nlgeom=YES, inc=1
*Static
1., 1., 1., 1.
*Boundary, op=NEW
PRIMARY_ALL, 2, 3, 0.
PATCH_NONCONTACT, 1, 1, 0.
SECONDARY_ALL, 2, 3, 0.
7, 1, 1, 0
11, 1, 1, 0
15, 1, 1, 0
23, 1, 1, 0
25, 1, 1, 0
27, 1, 1, 0
33, 1, 1, 0
35, 1, 1, -1e-06
37, 1, 1, 0
TILE_1, 1, 1, -0.015625
TILE_2, 1, 1, -0.015625
TILE_3, 1, 1, -0.015625
TILE_4, 1, 1, -0.015625
TILE_5, 1, 1, -0.015625
TILE_6, 1, 1, -0.015625
*Output, field, frequency=1
*Node Output
COORD, RF, U
*Contact Output
CSTRESS, CDISP, CFORCE
*End Step
*Step, name=S9_PLUS, nlgeom=YES, inc=1
*Static
1., 1., 1., 1.
*Boundary, op=NEW
PRIMARY_ALL, 2, 3, 0.
PATCH_NONCONTACT, 1, 1, 0.
SECONDARY_ALL, 2, 3, 0.
7, 1, 1, 0
11, 1, 1, 0
15, 1, 1, 0
23, 1, 1, 0
25, 1, 1, 0
27, 1, 1, 0
33, 1, 1, 0
35, 1, 1, 0
37, 1, 1, 1e-06
TILE_1, 1, 1, -0.015625
TILE_2, 1, 1, -0.015625
TILE_3, 1, 1, -0.015625
TILE_4, 1, 1, -0.015625
TILE_5, 1, 1, -0.015625
TILE_6, 1, 1, -0.015625
*Output, field, frequency=1
*Node Output
COORD, RF, U
*Contact Output
CSTRESS, CDISP, CFORCE
*End Step
*Step, name=S9_MINUS, nlgeom=YES, inc=1
*Static
1., 1., 1., 1.
*Boundary, op=NEW
PRIMARY_ALL, 2, 3, 0.
PATCH_NONCONTACT, 1, 1, 0.
SECONDARY_ALL, 2, 3, 0.
7, 1, 1, 0
11, 1, 1, 0
15, 1, 1, 0
23, 1, 1, 0
25, 1, 1, 0
27, 1, 1, 0
33, 1, 1, 0
35, 1, 1, 0
37, 1, 1, -1e-06
TILE_1, 1, 1, -0.015625
TILE_2, 1, 1, -0.015625
TILE_3, 1, 1, -0.015625
TILE_4, 1, 1, -0.015625
TILE_5, 1, 1, -0.015625
TILE_6, 1, 1, -0.015625
*Output, field, frequency=1
*Node Output
COORD, RF, U
*Contact Output
CSTRESS, CDISP, CFORCE
*End Step
