*Heading
** Independent C3D8T finite nonaffine capacity isolation: regular and warped geometry.
** Sixteen disconnected complete elements: eight nodal temperature bases per geometry.
** All displacements and temperatures prescribed; alpha=0, rho=2000, cp=3000, k=1e-20.
** One time increment of 1 s; each element has exactly one corner heated from 300 to 301 K.
*Preprint, echo=NO, model=NO, history=NO, contact=NO
*Node
1, 0.0000000000000000e+0, 0.0000000000000000e+0, 0.0000000000000000e+0
2, 5.0000000000000000e-1, 0.0000000000000000e+0, 0.0000000000000000e+0
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*Element, type=C3D8T, elset=ALL_ELEMENTS
1, 1, 2, 3, 4, 5, 6, 7, 8
2, 9, 10, 11, 12, 13, 14, 15, 16
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*Nset, nset=ALL_NODES, generate
1, 128, 1
*Material, name=THERMAL
*Elastic
2.0e11, 0.25
*Expansion, zero=300.0
0.0
*Conductivity
1.0e-20
*Density
2000.0
*Specific Heat
3000.0
*Solid Section, elset=ALL_ELEMENTS, material=THERMAL
,
*Initial Conditions, type=TEMPERATURE
ALL_NODES, 300.0
*Step, name=PROBE, nlgeom=YES, inc=1
*Coupled Temperature-Displacement
1.0, 1.0, 1.0, 1.0
*Boundary, op=NEW
1, 1, 1, 0.0000000000000000e+0
1, 2, 2, 0.0000000000000000e+0
1, 3, 3, 0.0000000000000000e+0
1, 11, 11, 301.0
2, 1, 1, 1.2000000000000000e-1
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128, 11, 11, 301.0
*Output, field, frequency=1
*Node Output
COORD, NT, RFL, U
*Element Output, position=INTEGRATION POINTS
IVOL, TEMP
*End Step
