*Heading
** b525_poisson_0499_refined: generated full-field Abaqus reference.
** through=2 tangential=16 step=2.0000000000000000e-02 distortion=8.0000000000000002e-02 initial_gap=0.0000000000000000e+00 path=monotonic
*Preprint, echo=NO, model=NO, history=NO, contact=YES
*Node
1, 0.0000000000000000e+00, 0.0000000000000000e+00, 0.0000000000000000e+00
2, 5.0000000000000000e-01, 0.0000000000000000e+00, 0.0000000000000000e+00
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*Element, type=C3D8T, elset=PRIMARY
1, 1, 2, 5, 4, 52, 53, 56, 55
2, 2, 3, 6, 5, 53, 54, 57, 56
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*Element, type=C3D8T, elset=SECONDARY
33, 103, 104, 107, 106, 154, 155, 158, 157
34, 104, 105, 108, 107, 155, 156, 159, 158
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*Elset, elset=PRIMARY_CONTACT_ELEMENTS
2, 4, 6, 8, 10, 12, 14, 16, 18, 20, 22, 24, 26, 28, 30, 32
*Elset, elset=SECONDARY_CONTACT_ELEMENTS
33, 35, 37, 39, 41, 43, 45, 47, 49, 51, 53, 55, 57, 59, 61, 63
*Elset, elset=SECONDARY_OUTER_ELEMENTS
34, 36, 38, 40, 42, 44, 46, 48, 50, 52, 54, 56, 58, 60, 62, 64
*Elset, elset=SECONDARY_OUTER_LOWER_ELEMENTS
34, 36, 38, 40, 42, 44, 46, 48
*Elset, elset=SECONDARY_OUTER_UPPER_ELEMENTS
50, 52, 54, 56, 58, 60, 62, 64
*Nset, nset=ALL_NODES
1, 2, 3, 4, 5, 6
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*Nset, nset=PRIMARY_OUTER_NODES
1, 4, 7, 10, 13, 16
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*Nset, nset=SECONDARY_OUTER_NODES
105, 108, 111, 114, 117, 120
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*Nset, nset=SECONDARY_CONTACT_NODES
103, 106, 109, 112, 115, 118
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*Nset, nset=SECONDARY_Y0
103, 104, 105, 154, 155, 156
*Surface, type=ELEMENT, name=PRIMARY_CONTACT
PRIMARY_CONTACT_ELEMENTS, S4
*Surface, type=ELEMENT, name=SECONDARY_CONTACT
SECONDARY_CONTACT_ELEMENTS, S6
*Surface, type=ELEMENT, name=SECONDARY_OUTER
SECONDARY_OUTER_ELEMENTS, S4
*Surface, type=ELEMENT, name=SECONDARY_OUTER_LOWER
SECONDARY_OUTER_LOWER_ELEMENTS, S4
*Surface, type=ELEMENT, name=SECONDARY_OUTER_UPPER
SECONDARY_OUTER_UPPER_ELEMENTS, S4
*Material, name=PRIMARY_MATERIAL
*Elastic
1.2000000000000000e8, 4.9900000000000000e-01, 3.0000000000000000e2
1.0000000000000000e8, 4.9900000000000000e-01, 5.0000000000000000e2
*Expansion, zero=3.0000000000000000e2
8.0000000000000007e-6
*Conductivity
1.5000000000000000e1, 3.0000000000000000e2
1.8000000000000000e1, 5.0000000000000000e2
*Density
1.0000000000000000e2
*Specific Heat
1.0000000000000000e0, 3.0000000000000000e2
1.2000000000000000e0, 5.0000000000000000e2
*Material, name=SECONDARY_MATERIAL
*Elastic
1.0000000000000000e8, 4.9900000000000000e-01, 3.0000000000000000e2
9.0000000000000000e7, 4.9900000000000000e-01, 5.0000000000000000e2
*Expansion, zero=3.0000000000000000e2
1.0000000000000001e-5
*Conductivity
1.0000000000000000e1, 3.0000000000000000e2
1.2000000000000000e1, 5.0000000000000000e2
*Density
1.0000000000000000e2
*Specific Heat
1.0000000000000000e0, 3.0000000000000000e2
1.2000000000000000e0, 5.0000000000000000e2
*Solid Section, elset=PRIMARY, material=PRIMARY_MATERIAL
,
*Solid Section, elset=SECONDARY, material=SECONDARY_MATERIAL
,
*Surface Interaction, name=COUPLED_CONTACT
*Surface Behavior, pressure-overclosure=LINEAR
1.0000000000000000e+09
*Friction, slip tolerance=5.0000000000000001e-03
2.0000000000000001e-01
*Gap Conductance, pressure
5.0000000000000000e+01, 0.0
5.5000000000000000e+02, 5.0e5
*Contact Pair, interaction=COUPLED_CONTACT, type=SURFACE TO SURFACE, adjust=0.
SECONDARY_CONTACT, PRIMARY_CONTACT
*Amplitude, name=TEMPERATURE_PATH, time=TOTAL TIME
0.0000000000000000e+00, 3.0000000000000000e+02, 1.0000000000000001e-01, 3.5000000000000000e+02, 2.0000000000000001e-01, 4.0000000000000000e+02, 2.9999999999999999e-01, 4.5000000000000000e+02
4.0000000000000002e-01, 5.0000000000000000e+02
*Amplitude, name=PRESSURE_PATH, time=TOTAL TIME
0.0000000000000000e+00, 0.0000000000000000e+00, 1.0000000000000001e-01, 8.7500000000000000e+04, 2.0000000000000001e-01, 1.7500000000000000e+05, 2.9999999999999999e-01, 2.6250000000000000e+05
4.0000000000000002e-01, 3.5000000000000000e+05
*Amplitude, name=NORMAL_PATH, time=TOTAL TIME
0.0000000000000000e+00, 0.0000000000000000e+00, 1.0000000000000001e-01, 0.0000000000000000e+00, 2.0000000000000001e-01, 0.0000000000000000e+00, 2.9999999999999999e-01, 0.0000000000000000e+00
4.0000000000000002e-01, 0.0000000000000000e+00
*Amplitude, name=TANGENTIAL_Y_PATH, time=TOTAL TIME
0.0000000000000000e+00, 0.0000000000000000e+00, 1.0000000000000001e-01, 5.0000000000000001e-03, 2.0000000000000001e-01, 1.0000000000000000e-02, 2.9999999999999999e-01, 1.4999999999999999e-02
4.0000000000000002e-01, 2.0000000000000000e-02
*Amplitude, name=TANGENTIAL_Z_PATH, time=TOTAL TIME
0.0000000000000000e+00, 0.0000000000000000e+00, 1.0000000000000001e-01, 2.5000000000000001e-03, 2.0000000000000001e-01, 5.0000000000000001e-03, 2.9999999999999999e-01, 7.4999999999999997e-03
4.0000000000000002e-01, 1.0000000000000000e-02
*Amplitude, name=BENDING_PATH, time=TOTAL TIME
0.0000000000000000e+00, 0.0000000000000000e+00, 1.0000000000000001e-01, 2.5000000000000000e-01, 2.0000000000000001e-01, 5.0000000000000000e-01, 2.9999999999999999e-01, 7.5000000000000000e-01
4.0000000000000002e-01, 1.0000000000000000e+00
*Initial Conditions, type=TEMPERATURE
ALL_NODES, 3.0000000000000000e2
*Diagnostics, nonhybrid=WARNING
*Step, name=PATH, nlgeom=YES, inc=160
*Coupled Temperature-Displacement
2.0000000000000000e-02, 4.0000000000000002e-01, 2.0000000000000000e-02, 2.0000000000000000e-02
*Controls, parameters=FIELD, field=DISPLACEMENT
1.0000000000000000e-10, 1.0000000000000000e-10, , , , 1.0000000000000000e-10
*Boundary
PRIMARY_OUTER_NODES, 1, 3, 0.0
PRIMARY_OUTER_NODES, 11, 11, 3.0000000000000000e2
*Boundary, amplitude=TEMPERATURE_PATH
SECONDARY_OUTER_NODES, 11, 11, 1.0
*Boundary
SECONDARY_Y0, 2, 3, 0.0
*Dsload, follower=NO, amplitude=BENDING_PATH
SECONDARY_OUTER_LOWER, TRVEC, 2.0000000000000000e+04, 0.0, 0.0, 1.0
SECONDARY_OUTER_UPPER, TRVEC, -2.0000000000000000e+04, 0.0, 0.0, 1.0
*Dsload, follower=YES, amplitude=PRESSURE_PATH
SECONDARY_OUTER, P, 1.0
*Output, field, frequency=1
*Node Output
COORD, NT, RF, RFL, U
*Element Output, directions=YES
CE, CEEQ, COORD, EE, HFL, IVOL, LE, PE, PEEQ, S, TEMP
*Contact Output
CDISP, CFORCE, CSTRESS, CTANDIR, CSTATUS, HFL
*Output, history, frequency=1
*Energy Output
ALLCD, ALLFD, ALLIE, ALLPD, ALLSE, ALLWK
*End Step
