*Heading
** b527_fine engineering quarter-cylinder fuel-cladding C3D8T full-field reference.
** fuel_radial=2 clad_radial=2 angular=6 axial=4 step=1.0000000000000000e+03 penalty=1.0000000000000000e+14
*Preprint, echo=NO, model=NO, history=NO, contact=YES
*Node
1, 1.0000000000000000e-03, 0.0000000000000000e+00, 0.0000000000000000e+00
2, 2.5000000000000001e-03, 0.0000000000000000e+00, 0.0000000000000000e+00
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*Element, type=C3D8T, elset=FUEL
1, 1, 2, 5, 4, 22, 23, 26, 25
2, 2, 3, 6, 5, 23, 24, 27, 26
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*Element, type=C3D8T, elset=CLAD
49, 106, 107, 110, 109, 127, 128, 131, 130
50, 107, 108, 111, 110, 128, 129, 132, 131
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*Elset, elset=FUEL_CONTACT_ELEMENTS
2, 4, 6, 8, 10, 12
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*Elset, elset=CLAD_CONTACT_ELEMENTS
49, 51, 53, 55, 57, 59
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*Nset, nset=ALL_NODES
1, 2, 3, 4, 5, 6
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*Nset, nset=FUEL_INNER_NODES
1, 4, 7, 10, 13, 16
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*Nset, nset=CLAD_OUTER_NODES
108, 111, 114, 117, 120, 123
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*Nset, nset=SECONDARY_CONTACT_NODES
106, 109, 112, 115, 118, 121
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*Nset, nset=FUEL_SYMMETRY_Y_NODES
1, 2, 3, 22, 23, 24, 43, 44, 45, 64, 65, 66, 85, 86, 87
*Nset, nset=FUEL_SYMMETRY_X_NODES
19, 20, 21, 40, 41, 42, 61, 62, 63, 82, 83, 84, 103, 104, 105
*Nset, nset=FUEL_BOTTOM_NODES
1, 2, 3, 4, 5, 6
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*Nset, nset=CLAD_SYMMETRY_Y_NODES
106, 107, 108, 127, 128, 129, 148, 149, 150, 169, 170, 171, 190, 191, 192
*Nset, nset=CLAD_SYMMETRY_X_NODES
124, 125, 126, 145, 146, 147, 166, 167, 168, 187, 188, 189, 208, 209, 210
*Nset, nset=CLAD_BOTTOM_NODES
106, 107, 108, 109, 110, 111
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*Surface, type=ELEMENT, name=FUEL_CONTACT
FUEL_CONTACT_ELEMENTS, S4
*Surface, type=ELEMENT, name=CLAD_CONTACT
CLAD_CONTACT_ELEMENTS, S6
*Material, name=FUEL_MATERIAL
*Elastic
2.0000000000000000e11, 3.0000000000000000e-1
*Expansion, zero=6.0000000000000000e2
1.0000000000000001e-5
*Conductivity
3.0000000000000000e0
*Density
1.0000000000000000e4
*Specific Heat
3.0000000000000000e2
*Material, name=CLAD_MATERIAL
*Elastic
1.0000000000000000e11, 3.2000000000000001e-1
*Expansion, zero=6.0000000000000000e2
5.0000000000000004e-6
*Conductivity
1.5000000000000000e1
*Density
6.5000000000000000e3
*Specific Heat
3.3000000000000000e2
*Solid Section, elset=FUEL, material=FUEL_MATERIAL
,
*Solid Section, elset=CLAD, material=CLAD_MATERIAL
,
*Surface Interaction, name=FUEL_CLAD_CONTACT
*Surface Behavior, pressure-overclosure=LINEAR
1.0000000000000000e+14
*Friction, slip tolerance=5.0000000000000001e-3
1.0000000000000001e-1
*Gap Conductance, pressure
1.0000000000000000e2, 0.0
1.1000000000000000e3, 1.0e8
*Contact Pair, interaction=FUEL_CLAD_CONTACT, type=SURFACE TO SURFACE, adjust=0.
CLAD_CONTACT, FUEL_CONTACT
*Amplitude, name=FUEL_TEMPERATURE, time=TOTAL TIME
0.0, 600.0, 10000.0, 1200.0
*Initial Conditions, type=TEMPERATURE
ALL_NODES, 6.0000000000000000e2
*Step, name=PATH, nlgeom=YES, inc=80
*Coupled Temperature-Displacement
1.0000000000000000e+03, 1.0000000000000000e4, 1.0000000000000000e+03, 1.0000000000000000e+03
*Controls, parameters=FIELD, field=DISPLACEMENT
1.0000000000000000e-10, 1.0000000000000000e-10, , , , 1.0000000000000000e-10
*Boundary
FUEL_INNER_NODES, 11, 11, 6.0000000000000000e2
CLAD_OUTER_NODES, 11, 11, 6.0000000000000000e2
FUEL_SYMMETRY_Y_NODES, 2, 2, 0.0
FUEL_SYMMETRY_X_NODES, 1, 1, 0.0
FUEL_BOTTOM_NODES, 3, 3, 0.0
CLAD_SYMMETRY_Y_NODES, 2, 2, 0.0
CLAD_SYMMETRY_X_NODES, 1, 1, 0.0
CLAD_BOTTOM_NODES, 3, 3, 0.0
*Boundary, amplitude=FUEL_TEMPERATURE
FUEL_INNER_NODES, 11, 11, 1.0
*Output, field, frequency=1
*Node Output
COORD, NT, RF, RFL, U
*Element Output, directions=YES
CE, CEEQ, COORD, EE, HFL, IVOL, LE, PE, PEEQ, S, TEMP
*Contact Output
CDISP, CFORCE, CSTRESS, CTANDIR, CSTATUS, HFL
*Output, history, frequency=1
*Energy Output
ALLCD, ALLFD, ALLIE, ALLPD, ALLSE, ALLWK
*End Step
