*Heading
** C3D8RT Abaqus/Standard C3D8RT corner-integrated thermal-load probe.
** SI units: metre, kelvin, watt.
*Preprint, echo=NO, model=NO, history=NO, contact=NO
*Node
1, 0.0000000000000000e+00, 0.0000000000000000e+00, 0.0000000000000000e+00
2, 1.2000000000000000e+00, 1.0000000000000001e-01, -5.0000000000000003e-02
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*Element, type=C3D8RT, elset=VOLUME
1, 1, 2, 3, 4, 5, 6, 7, 8
2, 9, 10, 11, 12, 13, 14, 15, 16
3, 17, 18, 19, 20, 21, 22, 23, 24
4, 25, 26, 27, 28, 29, 30, 31, 32
5, 33, 34, 35, 36, 37, 38, 39, 40
6, 41, 42, 43, 44, 45, 46, 47, 48
7, 49, 50, 51, 52, 53, 54, 55, 56
8, 57, 58, 59, 60, 61, 62, 63, 64
*Nset, nset=ALL_NODES, generate
1, 64, 1
*Material, name=THERMAL
*Elastic
2.0000000000000000e11, 2.5000000000000000e-1
*Conductivity
4.0000000000000000e0
*Density
2.0000000000000000e3
*Specific Heat
3.0000000000000000e3
*Solid Section, elset=VOLUME, material=THERMAL
,
*Initial Conditions, type=TEMPERATURE
ALL_NODES, 3.0000000000000000e2
*Step, name=BODY, nlgeom=NO, inc=20
*Coupled Temperature-Displacement, steady state
1.0, 1.0, 1.0e-8, 1.0
*Boundary, op=NEW
1, 1, 3, 0.0
1, 11, 11, 3.0000000000000000e+02
2, 1, 3, 0.0
2, 11, 11, 3.0000000000000000e+02
3, 1, 3, 0.0
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64, 11, 11, 3.0000000000000000e+02
*Dflux, op=NEW
1, BF, 8.0000000000000000e1
*Output, field, frequency=1
*Node Output
NT, RFL
*Element Output
IVOL, TEMP
*End Step
*Step, name=SURFACE, nlgeom=NO, inc=20
*Coupled Temperature-Displacement, steady state
1.0, 1.0, 1.0e-8, 1.0
*Boundary, op=NEW
1, 1, 3, 0.0
1, 11, 11, 3.0000000000000000e+02
2, 1, 3, 0.0
2, 11, 11, 3.0000000000000000e+02
3, 1, 3, 0.0
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64, 11, 11, 3.0000000000000000e+02
*Dflux, op=NEW
2, S2, 4.0000000000000000e1
*Output, field, frequency=1
*Node Output
NT, RFL
*Element Output
IVOL, TEMP
*End Step
*Step, name=FILM_BASE, nlgeom=NO, inc=20
*Coupled Temperature-Displacement, steady state
1.0, 1.0, 1.0e-8, 1.0
*Boundary, op=NEW
1, 1, 3, 0.0
1, 11, 11, 3.0000000000000000e+02
2, 1, 3, 0.0
2, 11, 11, 3.0000000000000000e+02
3, 1, 3, 0.0
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64, 11, 11, 3.8500000000000000e+02
*Dflux, op=NEW
3, BF, 0.0
*Output, field, frequency=1
*Node Output
NT, RFL
*Element Output
IVOL, TEMP
*End Step
*Step, name=FILM_ACTIVE, nlgeom=NO, inc=20
*Coupled Temperature-Displacement, steady state
1.0, 1.0, 1.0e-8, 1.0
*Boundary, op=NEW
1, 1, 3, 0.0
1, 11, 11, 3.0000000000000000e+02
2, 1, 3, 0.0
2, 11, 11, 3.0000000000000000e+02
3, 1, 3, 0.0
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64, 11, 11, 3.8500000000000000e+02
*Dflux, op=NEW
3, BF, 0.0
*Film, op=NEW
3, F2, 2.5000000000000000e2, 1.0000000000000000e1
*Output, field, frequency=1
*Node Output
NT, RFL
*Element Output
IVOL, TEMP
*End Step
*Step, name=SURFACE_GEOMETRY, nlgeom=NO, inc=20
*Coupled Temperature-Displacement, steady state
1.0, 1.0, 1.0e-8, 1.0
*Boundary, op=NEW
1, 1, 3, 0.0
1, 11, 11, 3.0000000000000000e+02
2, 1, 3, 0.0
2, 11, 11, 3.0000000000000000e+02
3, 1, 3, 0.0
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64, 11, 11, 3.0000000000000000e+02
*Dflux, op=NEW
2, S2, 4.0000000000000000e1
4, S2, 4.0000000000000000e1
5, S2, 4.0000000000000000e1
6, S2, 4.0000000000000000e1
7, S2, 4.0000000000000000e1
8, S2, 4.0000000000000000e1
*Output, field, frequency=1
*Node Output
NT, RFL
*Element Output
IVOL, TEMP
*End Step
