*Heading
** B5.33 Abaqus/Standard finite-strain C3D8RT isolated default hourglass probe.
*Preprint, echo=NO, model=NO, history=NO, contact=NO
*Node
1, 0.0000000000000000e+00, 0.0000000000000000e+00, 0.0000000000000000e+00
2, 1.0000000000000000e+00, 0.0000000000000000e+00, 0.0000000000000000e+00
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*Element, type=C3D8RT
1, 1, 2, 3, 4, 5, 6, 7, 8
2, 9, 10, 11, 12, 13, 14, 15, 16
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*Elset, elset=DEFAULT_HOURGLASS
1, 3, 5, 7, 9, 11, 13, 15, 17, 19, 21, 23
*Elset, elset=WEAK_HOURGLASS
2, 4, 6, 8, 10, 12, 14, 16, 18, 20, 22, 24
*Nset, nset=ALL_NODES, generate
1, 192, 1
*Material, name=ELASTIC
*Elastic
2.0000000000000000e11, 2.5000000000000000e-1
*Expansion, zero=3.0000000000000000e2
1.2000000000000000e-5
*Conductivity
4.0
*Density
2.0e3
*Specific Heat
3.0e3
*Solid Section, elset=DEFAULT_HOURGLASS, material=ELASTIC
,
*Solid Section, elset=WEAK_HOURGLASS, material=ELASTIC
,
*Hourglass Stiffness
1.0
*Initial Conditions, type=TEMPERATURE
ALL_NODES, 3.0e2
*Step, name=FINITE_HOURGLASS, nlgeom=YES, inc=1
*Coupled Temperature-Displacement
1.0, 1.0, 1.0e-8, 1.0
*Boundary
1, 1, 1, 0.0000000000000000e+00
1, 2, 2, 0.0000000000000000e+00
1, 3, 3, 0.0000000000000000e+00
1, 11, 11, 3.6000000000000000e+02
2, 1, 1, 4.8000000000000001e-02
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192, 11, 11, 4.5500000000000000e+02
*Output, field, frequency=1
*Node Output
RF, U
*Element Output
IVOL, S, TEMP
*End Step
