*Heading
** B5.4 Abaqus/Standard C3D8T finite-deformation thermal-load probe.
** SI units: metre, second, kelvin, watt.
*Preprint, echo=NO, model=NO, history=NO, contact=NO
*Node
1, 0.0000000000000000e+00, 0.0000000000000000e+00, 0.0000000000000000e+00
2, 1.2000000000000000e+00, 1.0000000000000001e-01, -5.0000000000000003e-02
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*Element, type=C3D8T, elset=VOLUME
1, 1, 2, 3, 4, 5, 6, 7, 8
2, 9, 10, 11, 12, 13, 14, 15, 16
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*Nset, nset=ALL_NODES, generate
1, 88, 1
*Material, name=THERMAL
*Elastic
2.0000000000000000e11, 2.5000000000000000e-1
*Expansion, zero=3.0000000000000000e2
0.0
*Conductivity
4.0000000000000000e0
*Density
2.0000000000000000e3
*Specific Heat
3.0000000000000000e3
*Solid Section, elset=VOLUME, material=THERMAL
,
*Initial Conditions, type=TEMPERATURE
ALL_NODES, 3.0000000000000000e2
*Step, name=DEFORM, nlgeom=YES, inc=20
*Coupled Temperature-Displacement, steady state
1.0, 1.0, 1.0e-8, 1.0
*Boundary, op=NEW
1, 1, 1, 0.0000000000000000e+00
1, 2, 2, 0.0000000000000000e+00
1, 3, 3, 0.0000000000000000e+00
1, 11, 11, 3.0000000000000000e+02
2, 1, 1, 6.0999999999999999e-01
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88, 11, 11, 3.0000000000000000e+02
*Output, field, frequency=1
*Node Output
COORD, NT, RFL, U
*Element Output
IVOL, TEMP
*End Step
*Step, name=CAPACITY, nlgeom=YES, inc=4
*Coupled Temperature-Displacement
1.0, 1.0, 1.0, 1.0
*Boundary, op=NEW
1, 1, 1, 0.0000000000000000e+00
1, 2, 2, 0.0000000000000000e+00
1, 3, 3, 0.0000000000000000e+00
1, 11, 11, 3.0100000000000000e+02
2, 1, 1, 6.0999999999999999e-01
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88, 11, 11, 3.0000000000000000e+02
*Output, field, frequency=1
*Node Output
COORD, NT, RFL, U
*Element Output
IVOL, TEMP
*End Step
*Step, name=BODY, nlgeom=YES, inc=20
*Coupled Temperature-Displacement, steady state
1.0, 1.0, 1.0e-8, 1.0
*Boundary, op=NEW
1, 1, 1, 0.0000000000000000e+00
1, 2, 2, 0.0000000000000000e+00
1, 3, 3, 0.0000000000000000e+00
1, 11, 11, 3.0000000000000000e+02
2, 1, 1, 6.0999999999999999e-01
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88, 11, 11, 3.0000000000000000e+02
*Dflux, op=NEW
9, BF, 8.0000000000000000e1
*Output, field, frequency=1
*Node Output
COORD, NT, RFL, U
*Element Output
IVOL, TEMP
*End Step
*Step, name=SURFACE, nlgeom=YES, inc=20
*Coupled Temperature-Displacement, steady state
1.0, 1.0, 1.0e-8, 1.0
*Boundary, op=NEW
1, 1, 1, 0.0000000000000000e+00
1, 2, 2, 0.0000000000000000e+00
1, 3, 3, 0.0000000000000000e+00
1, 11, 11, 3.0000000000000000e+02
2, 1, 1, 6.0999999999999999e-01
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88, 11, 11, 3.0000000000000000e+02
*Dflux, op=NEW
10, S2, 4.0000000000000000e1
*Output, field, frequency=1
*Node Output
COORD, NT, RFL, U
*Element Output
IVOL, TEMP
*End Step
*Step, name=FILM_BASE, nlgeom=YES, inc=20
*Coupled Temperature-Displacement, steady state
1.0, 1.0, 1.0e-8, 1.0
*Boundary, op=NEW
1, 1, 1, 0.0000000000000000e+00
1, 2, 2, 0.0000000000000000e+00
1, 3, 3, 0.0000000000000000e+00
1, 11, 11, 3.0000000000000000e+02
2, 1, 1, 6.0999999999999999e-01
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88, 11, 11, 3.8500000000000000e+02
*Dflux, op=NEW
11, BF, 0.0
*Output, field, frequency=1
*Node Output
COORD, NT, RFL, U
*Element Output
IVOL, TEMP
*End Step
*Step, name=FILM_ACTIVE, nlgeom=YES, inc=20
*Coupled Temperature-Displacement, steady state
1.0, 1.0, 1.0e-8, 1.0
*Boundary, op=NEW
1, 1, 1, 0.0000000000000000e+00
1, 2, 2, 0.0000000000000000e+00
1, 3, 3, 0.0000000000000000e+00
1, 11, 11, 3.0000000000000000e+02
2, 1, 1, 6.0999999999999999e-01
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88, 11, 11, 3.8500000000000000e+02
*Dflux, op=NEW
11, BF, 0.0
*Film, op=NEW
11, F2, 2.5000000000000000e2, 1.0000000000000000e1
*Output, field, frequency=1
*Node Output
COORD, NT, RFL, U
*Element Output
IVOL, TEMP
*End Step
