*Heading
** B5.54 full-size M5.8-equivalent finite-strain C3D8RT surface-to-surface benchmark.
** The mesh include is converted directly from m58_integrated_hex8_mesh.e.
** SI units: metre, second, kelvin, pascal, watt.
** Temperature and gap tables sample the stated analytic functions; no coefficient is fitted.
*Preprint, echo=NO, model=NO, history=NO, contact=YES
*Include, input=b547_m58_c3d8rt_integrated_mesh.inc
*Material, name=FUEL_MATERIAL
*Elastic
2e11, 0.316
*Expansion, zero=600
1e-5
*Conductivity
13.35666666666667, 300
7.09135593220339, 590
7.09025758346043, 590.1
7.089159606912911, 590.2
7.088062002371676, 590.3
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3.796666666666666, 1200
*Density
10970
*Specific Heat
300
*Material, name=CLAD_MATERIAL
*Elastic
7.5e10, 0.3
*Expansion, zero=600
5e-6
*Plastic
1e6, 0
2.0001e10, 1
*Creep, law=TIME
8e-28, 3, 0
*Conductivity
16
*Density
6500
*Specific Heat
330
*Solid Section, elset=FUEL, material=FUEL_MATERIAL
,
*Solid Section, elset=CLAD, material=CLAD_MATERIAL
,
*Surface Interaction, name=FUEL_CLADDING_CONTACT
*Surface Behavior, pressure-overclosure=LINEAR
1e10
*Friction
0.002
*Gap Conductance
4000, 0
4000, 1e-6
3960.396039603961, 1.01e-06
3921.568627450981, 1.02e-06
3883.495145631069, 1.03e-06
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4, 0.001
*Contact Pair, interaction=FUEL_CLADDING_CONTACT, type=SURFACE TO SURFACE, adjust=0.
FUEL_OUTER, CLAD_RMIN
*Amplitude, name=POWER_PATH, time=TOTAL TIME
0, 0, 0.2, 0.5, 0.5, 1, 0.8, 1.2
1, 1
*Amplitude, name=INTERNAL_PRESSURE_PATH, time=TOTAL TIME
0, 0, 0.2, 0.3, 0.5, 1, 0.8, 0.8
1, 1
*Amplitude, name=EXTERNAL_PRESSURE_PATH, time=TOTAL TIME
0, 0, 0.2, 0.8, 0.5, 1, 0.8, 1.2
1, 1
*Amplitude, name=FUEL_AXIAL_PATH, time=TOTAL TIME
0, 0, 0.2, 6e-05, 0.5, 0.0003, 0.8, 0.00048
1, 0.0005999999999999999
*Amplitude, name=CLAD_AXIAL_PATH, time=TOTAL TIME
0, 0, 0.2, 2e-06, 0.5, 1e-05, 0.8, 1.6e-05
1, 2e-05
*Initial Conditions, type=TEMPERATURE
ALL_NODES, 600
*Step, name=PATH, nlgeom=YES, inc=20
*Coupled Temperature-Displacement
0.05, 1, 0.05, 0.05
*Controls, parameters=FIELD, field=DISPLACEMENT
1e-10, 1e-10, , , , 1e-10
*Boundary
FUEL_BOTTOM, 1, 2, 0
CLAD_BOTTOM, 1, 3, 0
CLAD_RMAX, 11, 11, 600
*Boundary, amplitude=FUEL_AXIAL_PATH
FUEL_TOP, 3, 3, 1
*Boundary, amplitude=CLAD_AXIAL_PATH
CLAD_TOP, 3, 3, 1
*Dflux, amplitude=POWER_PATH
FUEL, BF, 2e7
*Dsload, follower=YES, amplitude=INTERNAL_PRESSURE_PATH
CLAD_RMIN, P, 5e5
*Dsload, follower=YES, amplitude=EXTERNAL_PRESSURE_PATH
CLAD_RMAX, P, 2e6
*Output, field, frequency=20
*Node Output
COORD, NT, RF, RFL, U
*Element Output, directions=YES
CEEQ, IVOL, PEEQ, S
*Contact Output
CDISP, CFORCE, CSTRESS, HFL
*Output, history, frequency=1
*Energy Output
ALLAE, ALLCD, ALLFD, ALLIE, ALLPD, ALLSE, ALLWK
*End Step
