*Heading
** B5.7 Abaqus/Standard temperature-dependent C3D8T lumped-capacity probe.
** Each state has a steady copy and a transient copy on the same distorted geometry.
** Their final reaction-flux difference isolates the transient capacity residual.
*Preprint, echo=NO, model=NO, history=NO, contact=NO
*Node
1, 0.0000000000000000e+00, 0.0000000000000000e+00, 0.0000000000000000e+00
2, 1.2000000000000000e+00, 1.0000000000000001e-01, -5.0000000000000003e-02
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*Element, type=C3D8T, elset=VOLUME
1, 1, 2, 3, 4, 5, 6, 7, 8
2, 9, 10, 11, 12, 13, 14, 15, 16
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*Nset, nset=ALL_NODES, generate
1, 272, 1
*Material, name=THERMAL
*Elastic
2.0000000000000000e11, 2.5000000000000000e-1
*Conductivity
4.0000000000000000e0
*Density
2.0000000000000000e3, 3.0000000000000000e2
1.7000000000000000e3, 6.0000000000000000e2
*Specific Heat
3.0000000000000000e3, 3.0000000000000000e2
4.2000000000000000e3, 6.0000000000000000e2
*Solid Section, elset=VOLUME, material=THERMAL
,
*Initial Conditions, type=TEMPERATURE
1, 3.1000000000000000e+02
2, 3.3000000000000000e+02
3, 3.5000000000000000e+02
4, 3.7000000000000000e+02
5, 3.9000000000000000e+02
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272, 4.5000000000000000e+02
*Step, name=STEADY, nlgeom=NO, inc=20
*Coupled Temperature-Displacement, steady state
1.0, 1.0, 1.0e-8, 1.0
*Boundary, op=NEW
1, 1, 3, 0.0
1, 11, 11, 3.6000000000000000e+02
2, 1, 3, 0.0
2, 11, 11, 4.1000000000000000e+02
3, 1, 3, 0.0
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272, 11, 11, 4.5000000000000000e+02
*Output, field, frequency=1
*Node Output
NT, RFL
*End Step
*Step, name=TRANSIENT, nlgeom=NO, inc=4
*Coupled Temperature-Displacement
1.0, 1.0, 1.0, 1.0
*Boundary, op=NEW
1, 1, 3, 0.0
1, 11, 11, 3.6000000000000000e+02
2, 1, 3, 0.0
2, 11, 11, 4.1000000000000000e+02
3, 1, 3, 0.0
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272, 11, 11, 4.5499900000000002e+02
*Output, field, frequency=1
*Node Output
NT, RFL
*End Step
