*Heading
** B5.9 Abaqus/Standard multi-material C3D8T mesh-refinement and distortion probe.
** Two bonded layers share nodes; three meshes undergo heating, holding and cooling.
*Preprint, echo=NO, model=NO, history=NO, contact=NO
*Node
1, 0.0000000000000000e+00, -1.0000000000000001e-01, 0.0000000000000000e+00
2, 1.0000000000000000e+00, -1.0000000000000001e-01, 0.0000000000000000e+00
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*Element, type=C3D8T, elset=LOWER
1, 1, 2, 5, 4, 10, 11, 14, 13
2, 2, 3, 6, 5, 11, 12, 15, 14
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*Element, type=C3D8T, elset=UPPER
3, 4, 5, 8, 7, 13, 14, 17, 16
4, 5, 6, 9, 8, 14, 15, 18, 17
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*Nset, nset=BOTTOM
1, 2, 3, 10, 11, 12
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*Nset, nset=TOP
7, 8, 9, 16, 17, 18
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*Nset, nset=LEFT_LOWER
1, 4, 10, 13, 1001, 1006
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*Nset, nset=ALL_NODES
1, 2, 3, 4, 5, 6
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*Material, name=LOWER_MATERIAL
*Elastic
1.2000000000000000e11, 2.8000000000000003e-1
*Expansion, zero=3.0000000000000000e2
1.8000000000000000e-5
*Conductivity
8.0000000000000000e0
*Density
1.0000000000000000e4
*Specific Heat
3.0000000000000000e2
*Material, name=UPPER_MATERIAL
*Elastic
2.0000000000000000e11, 3.0000000000000000e-1
*Expansion, zero=3.0000000000000000e2
7.0000000000000001e-6
*Conductivity
2.4000000000000000e1
*Density
6.5000000000000000e3
*Specific Heat
5.0000000000000000e2
*Solid Section, elset=LOWER, material=LOWER_MATERIAL
,
*Solid Section, elset=UPPER, material=UPPER_MATERIAL
,
*Initial Conditions, type=TEMPERATURE
ALL_NODES, 3.0000000000000000e2
*Step, name=STEP1, nlgeom=NO, inc=4
*Coupled Temperature-Displacement
1.0000000000000000e+07, 1.0000000000000000e+07, 1.0000000000000000e+07, 1.0000000000000000e+07
*Boundary, op=NEW
BOTTOM, 11, 11, 4.8000000000000000e+02
TOP, 11, 11, 3.0000000000000000e2
LEFT_LOWER, 1, 3, 0.0
*Output, field, frequency=1
*Node Output
NT, RFL, RF, U
*Element Output, directions=YES
COORD, E, HFL, IVOL, S, TEMP
*End Step
*Step, name=STEP2, nlgeom=NO, inc=4
*Coupled Temperature-Displacement
1.0000000000000000e+07, 1.0000000000000000e+07, 1.0000000000000000e+07, 1.0000000000000000e+07
*Boundary, op=NEW
BOTTOM, 11, 11, 6.0000000000000000e+02
TOP, 11, 11, 3.0000000000000000e2
LEFT_LOWER, 1, 3, 0.0
*Output, field, frequency=1
*Node Output
NT, RFL, RF, U
*Element Output, directions=YES
COORD, E, HFL, IVOL, S, TEMP
*End Step
*Step, name=STEP3, nlgeom=NO, inc=4
*Coupled Temperature-Displacement
1.0000000000000000e+07, 1.0000000000000000e+07, 1.0000000000000000e+07, 1.0000000000000000e+07
*Boundary, op=NEW
BOTTOM, 11, 11, 6.0000000000000000e+02
TOP, 11, 11, 3.0000000000000000e2
LEFT_LOWER, 1, 3, 0.0
*Output, field, frequency=1
*Node Output
NT, RFL, RF, U
*Element Output, directions=YES
COORD, E, HFL, IVOL, S, TEMP
*End Step
*Step, name=STEP4, nlgeom=NO, inc=4
*Coupled Temperature-Displacement
1.0000000000000000e+07, 1.0000000000000000e+07, 1.0000000000000000e+07, 1.0000000000000000e+07
*Boundary, op=NEW
BOTTOM, 11, 11, 3.3000000000000000e+02
TOP, 11, 11, 3.0000000000000000e2
LEFT_LOWER, 1, 3, 0.0
*Output, field, frequency=1
*Node Output
NT, RFL, RF, U
*Element Output, directions=YES
COORD, E, HFL, IVOL, S, TEMP
*End Step
