*Heading
** C3D20RT nonmatching surface-to-surface thermal contact and friction reversal.
** Generated from the same Fuelsim mesh that is stored as the tracked Exodus reference.
*Node
1, 0,-0.10000000000000001, 0
2, 1,-0.10000000000000001, 0
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*Element, type=C3D20RT, elset=PRIMARY
1, 1, 2, 3, 4, 5, 6, 7, 8, 9, 10, 11, 12, 17, 18, 19, 20, 13, 14, 15, 16
2, 4, 3, 21, 22, 8, 7, 23, 24, 11, 25, 26, 27, 19, 30, 31, 32, 16, 15, 28, 29
3, 22, 21, 33, 34, 24, 23, 35, 36, 26, 37, 38, 39, 31, 42, 43, 44, 29, 28, 40, 41
4, 34, 33, 45, 46, 36, 35, 47, 48, 38, 49, 50, 51, 43, 54, 55, 56, 41, 40, 52, 53
*Element, type=C3D20RT, elset=SECONDARY
5, 57, 58, 59, 60, 61, 62, 63, 64, 65, 66, 67, 68, 73, 74, 75, 76, 69, 70, 71, 72
6, 60, 59, 77, 78, 64, 63, 79, 80, 67, 81, 82, 83, 75, 86, 87, 88, 72, 71, 84, 85
*Elset, elset=ALL
PRIMARY, SECONDARY
*Nset, nset=PRIMARY_X0
1, 4, 5, 8, 12, 13
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*Nset, nset=SECONDARY_X2
58, 59, 62, 63, 66, 70, 71, 74, 77, 79, 81, 84, 86
*Nset, nset=SECONDARY_Y0
57, 58, 61, 62, 65, 69, 70, 73
*Nset, nset=SECONDARY_Z0
57, 58, 59, 60, 65, 66, 67, 68, 77, 78, 81, 82, 83
*Surface, type=ELEMENT, name=PRIMARY_CONTACT
PRIMARY, S4
*Surface, type=ELEMENT, name=SECONDARY_CONTACT
SECONDARY, S6
*Nset, nset=ALL_NODES, generate
1, 88, 1
*Nset, nset=SECONDARY_NODES, generate
57, 88, 1
*Material, name=ELASTIC
*Elastic
1.e9, 0.
*Conductivity
10
*Density
1
*Specific Heat
1
*Solid Section, elset=ALL, material=ELASTIC
,
*Surface Interaction, name=PENALTY_CONTACT
*Surface Behavior, pressure-overclosure=LINEAR
1.e11,
*Friction, slip tolerance=1.e-5
0.3,
*Gap Conductance
100, 0
100, 1e-5
*Gap Heat Generation
0, 0.5
*Contact Pair, interaction=PENALTY_CONTACT, type=SURFACE TO SURFACE, adjust=0.
SECONDARY_CONTACT, PRIMARY_CONTACT
*Initial Conditions, type=TEMPERATURE
ALL_NODES, 300
SECONDARY_NODES, 400
*Time Points, name=OUTPUT_TIMES, generate
0.025, 1., 0.025
*Step, name=INITIAL_STICK, nlgeom=YES, unsymm=YES, extrapolation=NO, inc=10000
*Coupled Temperature-Displacement, deltmx=100
0.025, 1., 1e-7, 0.025
*Controls, parameters=FIELD, field=DISPLACEMENT
1e-10, 1e-10, , , , 1e-10
*Controls, analysis=DISCONTINUOUS
*Controls, parameters=LINE SEARCH
5
*Boundary
PRIMARY_X0, 11, 11, 300
SECONDARY_X2, 11, 11, 400
PRIMARY_X0, 1, 3, 0.
SECONDARY_X2, 1, 1, -0.02
SECONDARY_X2, 2, 2, 0.005
SECONDARY_Z0, 3, 3, 0.
*Output, field, time points=OUTPUT_TIMES, time marks=YES
*Node Output
COORD, RF, U, NT, RFL
*Element Output, directions=YES
S, EE, COORD, IVOL
*Contact Output
CSTRESS, CDISP, CFORCE, HFLA, CTANDIR
*End Step
*Step, name=STICK, nlgeom=YES, unsymm=YES, extrapolation=NO, inc=10000
*Coupled Temperature-Displacement, deltmx=100
0.025, 1., 1e-7, 0.025
*Controls, parameters=FIELD, field=DISPLACEMENT
1e-10, 1e-10, , , , 1e-10
*Controls, analysis=DISCONTINUOUS
*Controls, parameters=LINE SEARCH
5
*Boundary
SECONDARY_X2, 1, 1, -0.02
SECONDARY_X2, 2, 2, 0.01
*Output, field, time points=OUTPUT_TIMES, time marks=YES
*Node Output
COORD, RF, U, NT, RFL
*Element Output, directions=YES
S, EE, COORD, IVOL
*Contact Output
CSTRESS, CDISP, CFORCE, HFLA, CTANDIR
*End Step
*Step, name=MIXED, nlgeom=YES, unsymm=YES, extrapolation=NO, inc=10000
*Coupled Temperature-Displacement, deltmx=100
0.025, 1., 1e-7, 0.025
*Controls, parameters=FIELD, field=DISPLACEMENT
1e-10, 1e-10, , , , 1e-10
*Controls, analysis=DISCONTINUOUS
*Controls, parameters=LINE SEARCH
5
*Boundary
SECONDARY_X2, 1, 1, -0.02
SECONDARY_X2, 2, 2, 0.03
*Output, field, time points=OUTPUT_TIMES, time marks=YES
*Node Output
COORD, RF, U, NT, RFL
*Element Output, directions=YES
S, EE, COORD, IVOL
*Contact Output
CSTRESS, CDISP, CFORCE, HFLA, CTANDIR
*End Step
*Step, name=FORWARD_SLIDE, nlgeom=YES, unsymm=YES, extrapolation=NO, inc=10000
*Coupled Temperature-Displacement, deltmx=100
0.025, 1., 1e-7, 0.025
*Controls, parameters=FIELD, field=DISPLACEMENT
1e-10, 1e-10, , , , 1e-10
*Controls, analysis=DISCONTINUOUS
*Controls, parameters=LINE SEARCH
5
*Boundary
SECONDARY_X2, 1, 1, -0.02
SECONDARY_X2, 2, 2, 0.06
*Output, field, time points=OUTPUT_TIMES, time marks=YES
*Node Output
COORD, RF, U, NT, RFL
*Element Output, directions=YES
S, EE, COORD, IVOL
*Contact Output
CSTRESS, CDISP, CFORCE, HFLA, CTANDIR
*End Step
*Step, name=UNLOAD, nlgeom=YES, unsymm=YES, extrapolation=NO, inc=10000
*Coupled Temperature-Displacement, deltmx=100
0.025, 1., 1e-7, 0.025
*Controls, parameters=FIELD, field=DISPLACEMENT
1e-10, 1e-10, , , , 1e-10
*Controls, analysis=DISCONTINUOUS
*Controls, parameters=LINE SEARCH
5
*Boundary
SECONDARY_X2, 1, 1, -0.02
SECONDARY_X2, 2, 2, 0.01
*Output, field, time points=OUTPUT_TIMES, time marks=YES
*Node Output
COORD, RF, U, NT, RFL
*Element Output, directions=YES
S, EE, COORD, IVOL
*Contact Output
CSTRESS, CDISP, CFORCE, HFLA, CTANDIR
*End Step
*Step, name=REVERSE_SLIDE, nlgeom=YES, unsymm=YES, extrapolation=NO, inc=10000
*Coupled Temperature-Displacement, deltmx=100
0.025, 1., 1e-7, 0.025
*Controls, parameters=FIELD, field=DISPLACEMENT
1e-10, 1e-10, , , , 1e-10
*Controls, analysis=DISCONTINUOUS
*Controls, parameters=LINE SEARCH
5
*Boundary
SECONDARY_X2, 1, 1, -0.02
SECONDARY_X2, 2, 2, -0.05
*Output, field, time points=OUTPUT_TIMES, time marks=YES
*Node Output
COORD, RF, U, NT, RFL
*Element Output, directions=YES
S, EE, COORD, IVOL
*Contact Output
CSTRESS, CDISP, CFORCE, HFLA, CTANDIR
*End Step
*Step, name=RESTICK, nlgeom=YES, unsymm=YES, extrapolation=NO, inc=10000
*Coupled Temperature-Displacement, deltmx=100
0.025, 1., 1e-7, 0.025
*Controls, parameters=FIELD, field=DISPLACEMENT
1e-10, 1e-10, , , , 1e-10
*Controls, analysis=DISCONTINUOUS
*Controls, parameters=LINE SEARCH
5
*Boundary
SECONDARY_X2, 1, 1, -0.02
SECONDARY_X2, 2, 2, -0.045
*Output, field, time points=OUTPUT_TIMES, time marks=YES
*Node Output
COORD, RF, U, NT, RFL
*Element Output, directions=YES
S, EE, COORD, IVOL
*Contact Output
CSTRESS, CDISP, CFORCE, HFLA, CTANDIR
*End Step
