*Heading
** Prescribed native first-increment displacement geometry; contact output identification only.
** Generated from the same Fuelsim mesh that is stored as the tracked Exodus reference.
*Node
1, 0,-0.10000000000000001, 0
2, 1,-0.10000000000000001, 0
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*Element, type=C3D20RT, elset=PRIMARY
1, 1, 2, 3, 4, 5, 6, 7, 8, 9, 10, 11, 12, 17, 18, 19, 20, 13, 14, 15, 16
2, 4, 3, 21, 22, 8, 7, 23, 24, 11, 25, 26, 27, 19, 30, 31, 32, 16, 15, 28, 29
3, 22, 21, 33, 34, 24, 23, 35, 36, 26, 37, 38, 39, 31, 42, 43, 44, 29, 28, 40, 41
4, 34, 33, 45, 46, 36, 35, 47, 48, 38, 49, 50, 51, 43, 54, 55, 56, 41, 40, 52, 53
*Element, type=C3D20RT, elset=SECONDARY
5, 57, 58, 59, 60, 61, 62, 63, 64, 65, 66, 67, 68, 73, 74, 75, 76, 69, 70, 71, 72
6, 60, 59, 77, 78, 64, 63, 79, 80, 67, 81, 82, 83, 75, 86, 87, 88, 72, 71, 84, 85
*Elset, elset=ALL
PRIMARY, SECONDARY
*Nset, nset=PRIMARY_X0
1, 4, 5, 8, 12, 13
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*Nset, nset=SECONDARY_X2
58, 59, 62, 63, 66, 70, 71, 74, 77, 79, 81, 84, 86
*Nset, nset=SECONDARY_Y0
57, 58, 61, 62, 65, 69, 70, 73
*Nset, nset=SECONDARY_Z0
57, 58, 59, 60, 65, 66, 67, 68, 77, 78, 81, 82, 83
*Surface, type=ELEMENT, name=PRIMARY_CONTACT
PRIMARY, S4
*Surface, type=ELEMENT, name=SECONDARY_CONTACT
SECONDARY, S6
*Nset, nset=ALL_NODES, generate
1, 88, 1
*Nset, nset=SECONDARY_NODES, generate
57, 88, 1
*Material, name=ELASTIC
*Elastic
1.e9, 0.
*Conductivity
10
*Density
1
*Specific Heat
1
*Solid Section, elset=ALL, material=ELASTIC
,
*Surface Interaction, name=PENALTY_CONTACT
*Surface Behavior, pressure-overclosure=LINEAR
1.e11,
*Friction, slip tolerance=1.e-5
0.3,
*Gap Conductance
100, 0
100, 1e-5
*Gap Heat Generation
0, 0.5
*Contact Pair, interaction=PENALTY_CONTACT, type=SURFACE TO SURFACE, small sliding, adjust=0.
SECONDARY_CONTACT, PRIMARY_CONTACT
*Initial Conditions, type=TEMPERATURE
ALL_NODES, 300
SECONDARY_NODES, 400
*Step, name=GEOMETRY_1, nlgeom=YES, unsymm=YES, extrapolation=NO
*Coupled Temperature-Displacement
0.025,0.025
*Boundary
1,1,1,-1.2634777659767471e-40
1,2,2,5.0188840596868322e-40
1,3,3,-3.1085809784098389e-41
2,1,1,-0.00015572864404336475
2,2,2,7.4689224790169093e-05
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SECONDARY_X2,11,11,400.
*Output, field, frequency=1
*Node Output
U,NT,RF,RFL
*Element Output, directions=YES
S
*Contact Output
CSTRESS,CDISP,CFORCE,HFLA,CTANDIR
*End Step
*Step, name=GEOMETRY_2, nlgeom=YES, unsymm=YES, extrapolation=NO
*Coupled Temperature-Displacement
0.025,0.025
*Boundary
1,1,1,-2.5269555319534942e-40
1,2,2,1.0037768119373664e-39
1,3,3,-6.2171619568196777e-41
2,1,1,-0.0003114572880867295
2,2,2,0.00014937844958033819
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SECONDARY_X2,11,11,400.
*Output, field, frequency=1
*Node Output
U,NT,RF,RFL
*Element Output, directions=YES
S
*Contact Output
CSTRESS,CDISP,CFORCE,HFLA,CTANDIR
*End Step
*Step, name=GEOMETRY_3, nlgeom=YES, unsymm=YES, extrapolation=NO
*Coupled Temperature-Displacement
0.025,0.025
*Boundary
1,1,1,-6.3173888298837355e-41
1,2,2,2.5094420298434161e-40
1,3,3,-1.5542904892049194e-41
2,1,1,-7.7864322021682376e-05
2,2,2,3.7344612395084547e-05
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SECONDARY_X2,11,11,400.
*Output, field, frequency=1
*Node Output
U,NT,RF,RFL
*Element Output, directions=YES
S
*Contact Output
CSTRESS,CDISP,CFORCE,HFLA,CTANDIR
*End Step
