*Heading
** Deformable curved contact crossing a primary edge boundary.
*Preprint,echo=NO,model=NO,history=NO,contact=NO
*Node
1,-0.029999999999999999,-0.01
2,0,-0.01
3,0,0
4,-0.029999999999999999,0
5,-0.014999999999999999,-0.01
6,0,-0.0050000000000000001
7,-0.014999999999999999,0
8,-0.029999999999999999,-0.0050000000000000001
9,0.029999999999999999,-0.01
10,0.029999999999999999,0
11,0.014999999999999999,-0.01
12,0.029999999999999999,-0.0050000000000000001
13,0.014999999999999999,0
14,-0.017999999999999999,0.00038799999999999994
15,-0.0060000000000000001,0.0001
16,-0.0060000000000000001,0.0101
17,-0.017999999999999999,0.010388
18,-0.012,0.00017200000000000001
19,-0.0060000000000000001,0.0051000000000000004
20,-0.012,0.010172
21,-0.017999999999999999,0.0053880000000000004
22,0.0060000000000000001,0.000388
23,0.0060000000000000001,0.010388
24,0,0.00017200000000000001
25,0.0060000000000000001,0.0053880000000000004
26,0,0.010172
101,0,0
102,0,0
*Element,type=CPEG8T,elset=lower
1,1,2,3,4,5,6,7,8
2,2,9,10,3,11,12,13,6
*Element,type=CPEG8T,elset=upper
3,14,15,16,17,18,19,20,21
4,15,22,23,16,24,25,26,19
*Nset,nset=bottom
1,2,5,9,11
*Nset,nset=top
16,17,20,23,26
*Nset,nset=lower
1,2,3,4,5,6,7,8,9,10,11,12,13
*Nset,nset=upper
14,15,16,17,18,19,20,21,22,23,24,25,26
*Nset,nset=field
1,2,3,4,5,6,7,8,9,10,11,12,13,14,15,16,17,18,19,20,21,22,23,24,25,26
*Nset,nset=CONTROLS
101,102
*Material,name=SOLID
*Elastic
1e6,.25
*Conductivity
10
*Density
1000
*Specific Heat
100
*Solid Section,elset=lower,material=SOLID,ref node=101
.1,0,0
*Solid Section,elset=upper,material=SOLID,ref node=102
.1,0,0
*Surface,name=PRIMARY,type=ELEMENT
lower,S3
*Surface,name=SECONDARY,type=ELEMENT
upper,S1
*Surface Interaction,name=INTERFACE
.1
*Surface Behavior,pressure-overclosure=LINEAR
1e9
*Gap Conductance
1000,0
1000,1
*Contact Pair,interaction=INTERFACE,type=SURFACE TO SURFACE
SECONDARY,PRIMARY
*Initial Conditions,type=TEMPERATURE
field,300

*Step,name=F1_C0,nlgeom=YES,inc=10
*Coupled Temperature-Displacement,steady state
1,1,1,1
*Boundary,op=NEW
CONTROLS,3,5,0
1,1,1,1.6989652648037276e-76
1,2,2,1.2898323267916723e-75
2,1,1,-1.0385869444394222e-70
2,2,2,8.950778500933535e-68
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23,11,11,300
*Output,field,frequency=1
*Node Output
NT,U,RF,RFL
*End Step
*Step,name=F1_C1,nlgeom=YES,inc=10
*Coupled Temperature-Displacement,steady state
1,1,1,1
*Boundary,op=NEW
CONTROLS,3,5,0
1,1,1,1.6989652648037276e-76
1,2,2,1.2898323267916723e-75
2,1,1,-1.0385869444394222e-70
2,2,2,8.950778500933535e-68
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23,11,11,300
*Output,field,frequency=1
*Node Output
NT,U,RF,RFL
*End Step
*Step,name=F1_C2,nlgeom=YES,inc=10
*Coupled Temperature-Displacement,steady state
1,1,1,1
*Boundary,op=NEW
CONTROLS,3,5,0
1,1,1,1.6989652648037276e-76
1,2,2,1.2898323267916723e-75
2,1,1,-1.0385869444394222e-70
2,2,2,8.950778500933535e-68
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23,11,11,300
*Output,field,frequency=1
*Node Output
NT,U,RF,RFL
*End Step
*Step,name=F1_C3,nlgeom=YES,inc=10
*Coupled Temperature-Displacement,steady state
1,1,1,1
*Boundary,op=NEW
CONTROLS,3,5,0
1,1,1,1.6989652648037276e-76
1,2,2,1.2898323267916723e-75
2,1,1,-1.0385869444394222e-70
2,2,2,8.950778500933535e-68
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23,11,11,300
*Output,field,frequency=1
*Node Output
NT,U,RF,RFL
*End Step
*Step,name=F1_C4,nlgeom=YES,inc=10
*Coupled Temperature-Displacement,steady state
1,1,1,1
*Boundary,op=NEW
CONTROLS,3,5,0
1,1,1,1.6989652648037276e-76
1,2,2,1.2898323267916723e-75
2,1,1,-1.0385869444394222e-70
2,2,2,8.950778500933535e-68
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23,11,11,300
*Output,field,frequency=1
*Node Output
NT,U,RF,RFL
*End Step
*Step,name=F1_C5,nlgeom=YES,inc=10
*Coupled Temperature-Displacement,steady state
1,1,1,1
*Boundary,op=NEW
CONTROLS,3,5,0
1,1,1,1.6989652648037276e-76
1,2,2,1.2898323267916723e-75
2,1,1,-1.0385869444394222e-70
2,2,2,8.950778500933535e-68
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23,11,11,300
*Output,field,frequency=1
*Node Output
NT,U,RF,RFL
*End Step
*Step,name=F1_C6,nlgeom=YES,inc=10
*Coupled Temperature-Displacement,steady state
1,1,1,1
*Boundary,op=NEW
CONTROLS,3,5,0
1,1,1,1.6989652648037276e-76
1,2,2,1.2898323267916723e-75
2,1,1,-1.0385869444394222e-70
2,2,2,8.950778500933535e-68
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23,11,11,300
*Output,field,frequency=1
*Node Output
NT,U,RF,RFL
*End Step
*Step,name=F1_C7,nlgeom=YES,inc=10
*Coupled Temperature-Displacement,steady state
1,1,1,1
*Boundary,op=NEW
CONTROLS,3,5,0
1,1,1,1.6989652648037276e-76
1,2,2,1.2898323267916723e-75
2,1,1,-1.0385869444394222e-70
2,2,2,8.950778500933535e-68
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23,11,11,300
*Output,field,frequency=1
*Node Output
NT,U,RF,RFL
*End Step
*Step,name=F1_C8,nlgeom=YES,inc=10
*Coupled Temperature-Displacement,steady state
1,1,1,1
*Boundary,op=NEW
CONTROLS,3,5,0
1,1,1,1.6989652648037276e-76
1,2,2,1.2898323267916723e-75
2,1,1,-1.0385869444394222e-70
2,2,2,8.950778500933535e-68
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23,11,11,300
*Output,field,frequency=1
*Node Output
NT,U,RF,RFL
*End Step
*Step,name=F1_C9,nlgeom=YES,inc=10
*Coupled Temperature-Displacement,steady state
1,1,1,1
*Boundary,op=NEW
CONTROLS,3,5,0
1,1,1,1.6989652648037276e-76
1,2,2,1.2898323267916723e-75
2,1,1,-1.0385869444394222e-70
2,2,2,8.950778500933535e-68
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23,11,11,300
*Output,field,frequency=1
*Node Output
NT,U,RF,RFL
*End Step
*Step,name=F1_C10,nlgeom=YES,inc=10
*Coupled Temperature-Displacement,steady state
1,1,1,1
*Boundary,op=NEW
CONTROLS,3,5,0
1,1,1,1.6989652648037276e-76
1,2,2,1.2898323267916723e-75
2,1,1,-1.0385869444394222e-70
2,2,2,8.950778500933535e-68
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23,11,11,300
*Output,field,frequency=1
*Node Output
NT,U,RF,RFL
*End Step
*Step,name=F1_C11,nlgeom=YES,inc=10
*Coupled Temperature-Displacement,steady state
1,1,1,1
*Boundary,op=NEW
CONTROLS,3,5,0
1,1,1,1.6989652648037276e-76
1,2,2,1.2898323267916723e-75
2,1,1,-1.0385869444394222e-70
2,2,2,8.950778500933535e-68
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23,11,11,300
*Output,field,frequency=1
*Node Output
NT,U,RF,RFL
*End Step
*Step,name=F1_C12,nlgeom=YES,inc=10
*Coupled Temperature-Displacement,steady state
1,1,1,1
*Boundary,op=NEW
CONTROLS,3,5,0
1,1,1,1.6989652648037276e-76
1,2,2,1.2898323267916723e-75
2,1,1,-1.0385869444394222e-70
2,2,2,8.950778500933535e-68
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23,11,11,301
*Output,field,frequency=1
*Node Output
NT,U,RF,RFL
*End Step
*Step,name=F13_C0,nlgeom=YES,inc=10
*Coupled Temperature-Displacement,steady state
1,1,1,1
*Boundary,op=NEW
CONTROLS,3,5,0
1,1,1,2.9930564636509486e-74
1,2,2,1.8457710231614108e-73
2,1,1,-7.4570836282166562e-67
2,2,2,7.2948549310439207e-66
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23,11,11,300
*Output,field,frequency=1
*Node Output
NT,U,RF,RFL
*End Step
*Step,name=F13_C1,nlgeom=YES,inc=10
*Coupled Temperature-Displacement,steady state
1,1,1,1
*Boundary,op=NEW
CONTROLS,3,5,0
1,1,1,2.9930564636509486e-74
1,2,2,1.8457710231614108e-73
2,1,1,-7.4570836282166562e-67
2,2,2,7.2948549310439207e-66
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23,11,11,300
*Output,field,frequency=1
*Node Output
NT,U,RF,RFL
*End Step
*Step,name=F13_C2,nlgeom=YES,inc=10
*Coupled Temperature-Displacement,steady state
1,1,1,1
*Boundary,op=NEW
CONTROLS,3,5,0
1,1,1,2.9930564636509486e-74
1,2,2,1.8457710231614108e-73
2,1,1,-7.4570836282166562e-67
2,2,2,7.2948549310439207e-66
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23,11,11,300
*Output,field,frequency=1
*Node Output
NT,U,RF,RFL
*End Step
*Step,name=F13_C3,nlgeom=YES,inc=10
*Coupled Temperature-Displacement,steady state
1,1,1,1
*Boundary,op=NEW
CONTROLS,3,5,0
1,1,1,2.9930564636509486e-74
1,2,2,1.8457710231614108e-73
2,1,1,-7.4570836282166562e-67
2,2,2,7.2948549310439207e-66
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23,11,11,300
*Output,field,frequency=1
*Node Output
NT,U,RF,RFL
*End Step
*Step,name=F13_C4,nlgeom=YES,inc=10
*Coupled Temperature-Displacement,steady state
1,1,1,1
*Boundary,op=NEW
CONTROLS,3,5,0
1,1,1,2.9930564636509486e-74
1,2,2,1.8457710231614108e-73
2,1,1,-7.4570836282166562e-67
2,2,2,7.2948549310439207e-66
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23,11,11,300
*Output,field,frequency=1
*Node Output
NT,U,RF,RFL
*End Step
*Step,name=F13_C5,nlgeom=YES,inc=10
*Coupled Temperature-Displacement,steady state
1,1,1,1
*Boundary,op=NEW
CONTROLS,3,5,0
1,1,1,2.9930564636509486e-74
1,2,2,1.8457710231614108e-73
2,1,1,-7.4570836282166562e-67
2,2,2,7.2948549310439207e-66
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23,11,11,300
*Output,field,frequency=1
*Node Output
NT,U,RF,RFL
*End Step
*Step,name=F13_C6,nlgeom=YES,inc=10
*Coupled Temperature-Displacement,steady state
1,1,1,1
*Boundary,op=NEW
CONTROLS,3,5,0
1,1,1,2.9930564636509486e-74
1,2,2,1.8457710231614108e-73
2,1,1,-7.4570836282166562e-67
2,2,2,7.2948549310439207e-66
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23,11,11,300
*Output,field,frequency=1
*Node Output
NT,U,RF,RFL
*End Step
*Step,name=F13_C7,nlgeom=YES,inc=10
*Coupled Temperature-Displacement,steady state
1,1,1,1
*Boundary,op=NEW
CONTROLS,3,5,0
1,1,1,2.9930564636509486e-74
1,2,2,1.8457710231614108e-73
2,1,1,-7.4570836282166562e-67
2,2,2,7.2948549310439207e-66
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23,11,11,300
*Output,field,frequency=1
*Node Output
NT,U,RF,RFL
*End Step
*Step,name=F13_C8,nlgeom=YES,inc=10
*Coupled Temperature-Displacement,steady state
1,1,1,1
*Boundary,op=NEW
CONTROLS,3,5,0
1,1,1,2.9930564636509486e-74
1,2,2,1.8457710231614108e-73
2,1,1,-7.4570836282166562e-67
2,2,2,7.2948549310439207e-66
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23,11,11,300
*Output,field,frequency=1
*Node Output
NT,U,RF,RFL
*End Step
*Step,name=F13_C9,nlgeom=YES,inc=10
*Coupled Temperature-Displacement,steady state
1,1,1,1
*Boundary,op=NEW
CONTROLS,3,5,0
1,1,1,2.9930564636509486e-74
1,2,2,1.8457710231614108e-73
2,1,1,-7.4570836282166562e-67
2,2,2,7.2948549310439207e-66
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23,11,11,300
*Output,field,frequency=1
*Node Output
NT,U,RF,RFL
*End Step
*Step,name=F13_C10,nlgeom=YES,inc=10
*Coupled Temperature-Displacement,steady state
1,1,1,1
*Boundary,op=NEW
CONTROLS,3,5,0
1,1,1,2.9930564636509486e-74
1,2,2,1.8457710231614108e-73
2,1,1,-7.4570836282166562e-67
2,2,2,7.2948549310439207e-66
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23,11,11,300
*Output,field,frequency=1
*Node Output
NT,U,RF,RFL
*End Step
*Step,name=F13_C11,nlgeom=YES,inc=10
*Coupled Temperature-Displacement,steady state
1,1,1,1
*Boundary,op=NEW
CONTROLS,3,5,0
1,1,1,2.9930564636509486e-74
1,2,2,1.8457710231614108e-73
2,1,1,-7.4570836282166562e-67
2,2,2,7.2948549310439207e-66
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23,11,11,300
*Output,field,frequency=1
*Node Output
NT,U,RF,RFL
*End Step
*Step,name=F13_C12,nlgeom=YES,inc=10
*Coupled Temperature-Displacement,steady state
1,1,1,1
*Boundary,op=NEW
CONTROLS,3,5,0
1,1,1,2.9930564636509486e-74
1,2,2,1.8457710231614108e-73
2,1,1,-7.4570836282166562e-67
2,2,2,7.2948549310439207e-66
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23,11,11,301
*Output,field,frequency=1
*Node Output
NT,U,RF,RFL
*End Step
