*Heading
** H20.28 Abaqus/Standard small-sliding C3D20 averaging-region refinement probe.
** One secondary face opposes an 8-by-8 primary face mesh.
*Preprint, echo=NO, model=NO, history=NO, contact=YES
*Node
1, 0, 0, 0
2, 1, 0, 0
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*Element, type=C3D20, elset=PRIMARY
1, 1, 2, 3, 4, 5, 6, 7, 8, 9, 10, 11, 12, 13, 14, 15, 16, 17, 18, 19, 20
2, 5, 6, 7, 8, 21, 22, 23, 24, 13, 14, 15, 16, 25, 26, 27, 28, 29, 30, 31, 32
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*Element, type=C3D20, elset=SECONDARY
65, 532, 533, 534, 535, 536, 537, 538, 539, 540, 541, 542, 543, 544, 545, 546, 547, 548, 549, 550, 551
*Nset, nset=PRIMARY_ALL
1, 2, 3, 4, 5, 6
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*Nset, nset=PRIMARY_FACE
2, 3, 6, 7, 10, 14
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*Nset, nset=SECONDARY_ALL
532, 533, 534, 535, 536, 537
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*Nset, nset=SECONDARY_FACE
532, 535, 539, 536, 543, 551, 547, 548
*Nset, nset=S1
532
*Nset, nset=S2
535
*Nset, nset=S3
539
*Nset, nset=S4
536
*Nset, nset=S5
543
*Nset, nset=S6
551
*Nset, nset=S7
547
*Nset, nset=S8
548
*Surface, type=ELEMENT, name=PRIMARY_CONTACT
PRIMARY, S4
*Surface, type=ELEMENT, name=SECONDARY_CONTACT
SECONDARY, S6
*Material, name=ELASTIC
*Elastic
1.e9, 0.
*Solid Section, elset=PRIMARY, material=ELASTIC
,
*Solid Section, elset=SECONDARY, material=ELASTIC
,
*Surface Interaction, name=LINEAR_PENALTY
*Surface Behavior, penalty=LINEAR
1.e8,
*Contact Pair, interaction=LINEAR_PENALTY, type=SURFACE TO SURFACE, small sliding, adjust=0., sliding transition=LINEAR smoothing
SECONDARY_CONTACT, PRIMARY_CONTACT
*Step, name=BASE, nlgeom=NO, inc=40
*Static
0.1, 1., 1.e-8, 0.1
*Boundary
PRIMARY_ALL, 1, 3, 0.
SECONDARY_ALL, 2, 3, 0.
S1, 1, 1, -1.e-4
S2, 1, 1, -1.e-4
S3, 1, 1, -1.e-4
S4, 1, 1, -1.e-4
S5, 1, 1, -1.e-4
S6, 1, 1, -1.e-4
S7, 1, 1, -1.e-4
S8, 1, 1, -1.e-4
*Output, field, frequency=1
*Node Output
COORD, RF, U
*Contact Output
CSTRESS, CDISP, CFORCE
*End Step
*Step, name=S1_PLUS, nlgeom=NO, inc=40
*Static
0.1, 1., 1.e-8, 0.1
*Boundary, op=MOD
S1, 1, 1, -1.01e-4
S2, 1, 1, -1.e-4
S3, 1, 1, -1.e-4
S4, 1, 1, -1.e-4
S5, 1, 1, -1.e-4
S6, 1, 1, -1.e-4
S7, 1, 1, -1.e-4
S8, 1, 1, -1.e-4
*End Step
*Step, name=S1_MINUS, nlgeom=NO, inc=40
*Static
0.1, 1., 1.e-8, 0.1
*Boundary, op=MOD
S1, 1, 1, -9.9e-5
S2, 1, 1, -1.e-4
S3, 1, 1, -1.e-4
S4, 1, 1, -1.e-4
S5, 1, 1, -1.e-4
S6, 1, 1, -1.e-4
S7, 1, 1, -1.e-4
S8, 1, 1, -1.e-4
*End Step
*Step, name=S2_PLUS, nlgeom=NO, inc=40
*Static
0.1, 1., 1.e-8, 0.1
*Boundary, op=MOD
S1, 1, 1, -1.e-4
S2, 1, 1, -1.01e-4
S3, 1, 1, -1.e-4
S4, 1, 1, -1.e-4
S5, 1, 1, -1.e-4
S6, 1, 1, -1.e-4
S7, 1, 1, -1.e-4
S8, 1, 1, -1.e-4
*End Step
*Step, name=S2_MINUS, nlgeom=NO, inc=40
*Static
0.1, 1., 1.e-8, 0.1
*Boundary, op=MOD
S1, 1, 1, -1.e-4
S2, 1, 1, -9.9e-5
S3, 1, 1, -1.e-4
S4, 1, 1, -1.e-4
S5, 1, 1, -1.e-4
S6, 1, 1, -1.e-4
S7, 1, 1, -1.e-4
S8, 1, 1, -1.e-4
*End Step
*Step, name=S3_PLUS, nlgeom=NO, inc=40
*Static
0.1, 1., 1.e-8, 0.1
*Boundary, op=MOD
S1, 1, 1, -1.e-4
S2, 1, 1, -1.e-4
S3, 1, 1, -1.01e-4
S4, 1, 1, -1.e-4
S5, 1, 1, -1.e-4
S6, 1, 1, -1.e-4
S7, 1, 1, -1.e-4
S8, 1, 1, -1.e-4
*End Step
*Step, name=S3_MINUS, nlgeom=NO, inc=40
*Static
0.1, 1., 1.e-8, 0.1
*Boundary, op=MOD
S1, 1, 1, -1.e-4
S2, 1, 1, -1.e-4
S3, 1, 1, -9.9e-5
S4, 1, 1, -1.e-4
S5, 1, 1, -1.e-4
S6, 1, 1, -1.e-4
S7, 1, 1, -1.e-4
S8, 1, 1, -1.e-4
*End Step
*Step, name=S4_PLUS, nlgeom=NO, inc=40
*Static
0.1, 1., 1.e-8, 0.1
*Boundary, op=MOD
S1, 1, 1, -1.e-4
S2, 1, 1, -1.e-4
S3, 1, 1, -1.e-4
S4, 1, 1, -1.01e-4
S5, 1, 1, -1.e-4
S6, 1, 1, -1.e-4
S7, 1, 1, -1.e-4
S8, 1, 1, -1.e-4
*End Step
*Step, name=S4_MINUS, nlgeom=NO, inc=40
*Static
0.1, 1., 1.e-8, 0.1
*Boundary, op=MOD
S1, 1, 1, -1.e-4
S2, 1, 1, -1.e-4
S3, 1, 1, -1.e-4
S4, 1, 1, -9.9e-5
S5, 1, 1, -1.e-4
S6, 1, 1, -1.e-4
S7, 1, 1, -1.e-4
S8, 1, 1, -1.e-4
*End Step
*Step, name=S5_PLUS, nlgeom=NO, inc=40
*Static
0.1, 1., 1.e-8, 0.1
*Boundary, op=MOD
S1, 1, 1, -1.e-4
S2, 1, 1, -1.e-4
S3, 1, 1, -1.e-4
S4, 1, 1, -1.e-4
S5, 1, 1, -1.01e-4
S6, 1, 1, -1.e-4
S7, 1, 1, -1.e-4
S8, 1, 1, -1.e-4
*End Step
*Step, name=S5_MINUS, nlgeom=NO, inc=40
*Static
0.1, 1., 1.e-8, 0.1
*Boundary, op=MOD
S1, 1, 1, -1.e-4
S2, 1, 1, -1.e-4
S3, 1, 1, -1.e-4
S4, 1, 1, -1.e-4
S5, 1, 1, -9.9e-5
S6, 1, 1, -1.e-4
S7, 1, 1, -1.e-4
S8, 1, 1, -1.e-4
*End Step
*Step, name=S6_PLUS, nlgeom=NO, inc=40
*Static
0.1, 1., 1.e-8, 0.1
*Boundary, op=MOD
S1, 1, 1, -1.e-4
S2, 1, 1, -1.e-4
S3, 1, 1, -1.e-4
S4, 1, 1, -1.e-4
S5, 1, 1, -1.e-4
S6, 1, 1, -1.01e-4
S7, 1, 1, -1.e-4
S8, 1, 1, -1.e-4
*End Step
*Step, name=S6_MINUS, nlgeom=NO, inc=40
*Static
0.1, 1., 1.e-8, 0.1
*Boundary, op=MOD
S1, 1, 1, -1.e-4
S2, 1, 1, -1.e-4
S3, 1, 1, -1.e-4
S4, 1, 1, -1.e-4
S5, 1, 1, -1.e-4
S6, 1, 1, -9.9e-5
S7, 1, 1, -1.e-4
S8, 1, 1, -1.e-4
*End Step
*Step, name=S7_PLUS, nlgeom=NO, inc=40
*Static
0.1, 1., 1.e-8, 0.1
*Boundary, op=MOD
S1, 1, 1, -1.e-4
S2, 1, 1, -1.e-4
S3, 1, 1, -1.e-4
S4, 1, 1, -1.e-4
S5, 1, 1, -1.e-4
S6, 1, 1, -1.e-4
S7, 1, 1, -1.01e-4
S8, 1, 1, -1.e-4
*End Step
*Step, name=S7_MINUS, nlgeom=NO, inc=40
*Static
0.1, 1., 1.e-8, 0.1
*Boundary, op=MOD
S1, 1, 1, -1.e-4
S2, 1, 1, -1.e-4
S3, 1, 1, -1.e-4
S4, 1, 1, -1.e-4
S5, 1, 1, -1.e-4
S6, 1, 1, -1.e-4
S7, 1, 1, -9.9e-5
S8, 1, 1, -1.e-4
*End Step
*Step, name=S8_PLUS, nlgeom=NO, inc=40
*Static
0.1, 1., 1.e-8, 0.1
*Boundary, op=MOD
S1, 1, 1, -1.e-4
S2, 1, 1, -1.e-4
S3, 1, 1, -1.e-4
S4, 1, 1, -1.e-4
S5, 1, 1, -1.e-4
S6, 1, 1, -1.e-4
S7, 1, 1, -1.e-4
S8, 1, 1, -1.01e-4
*End Step
*Step, name=S8_MINUS, nlgeom=NO, inc=40
*Static
0.1, 1., 1.e-8, 0.1
*Boundary, op=MOD
S1, 1, 1, -1.e-4
S2, 1, 1, -1.e-4
S3, 1, 1, -1.e-4
S4, 1, 1, -1.e-4
S5, 1, 1, -1.e-4
S6, 1, 1, -1.e-4
S7, 1, 1, -1.e-4
S8, 1, 1, -9.9e-5
*End Step
