*Heading
** H20.29: tilted C3D20 small-sliding surface-to-surface contact.
*Preprint, echo=NO, model=NO, history=NO, contact=YES
*Node
1, 0, 0, 0
2, 0.9063077870366499, 0.4226182617406994, 0
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*Element, type=C3D20, elset=PRIMARY
1, 1, 2, 3, 4, 5, 6, 7, 8, 9, 10, 11, 12, 17, 18, 19, 20, 13, 14, 15, 16
2, 4, 3, 21, 22, 8, 7, 23, 24, 11, 25, 26, 27, 19, 30, 31, 32, 16, 15, 28, 29
3, 22, 21, 33, 34, 24, 23, 35, 36, 26, 37, 38, 39, 31, 42, 43, 44, 29, 28, 40, 41
4, 5, 6, 7, 8, 45, 46, 47, 48, 17, 18, 19, 20, 53, 54, 55, 56, 49, 50, 51, 52
5, 8, 7, 23, 24, 48, 47, 57, 58, 19, 30, 31, 32, 55, 61, 62, 63, 52, 51, 59, 60
6, 24, 23, 35, 36, 58, 57, 64, 65, 31, 42, 43, 44, 62, 68, 69, 70, 60, 59, 66, 67
*Element, type=C3D20, elset=SECONDARY
7, 71, 72, 73, 74, 75, 76, 77, 78, 79, 80, 81, 82, 87, 88, 89, 90, 83, 84, 85, 86
8, 74, 73, 91, 92, 78, 77, 93, 94, 81, 95, 96, 97, 89, 100, 101, 102, 86, 85, 98, 99
9, 75, 76, 77, 78, 103, 104, 105, 106, 87, 88, 89, 90, 111, 112, 113, 114, 107, 108, 109, 110
10, 78, 77, 93, 94, 106, 105, 115, 116, 89, 100, 101, 102, 113, 119, 120, 121, 110, 109, 117, 118
11, 103, 104, 105, 106, 122, 123, 124, 125, 111, 112, 113, 114, 130, 131, 132, 133, 126, 127, 128, 129
12, 106, 105, 115, 116, 125, 124, 134, 135, 113, 119, 120, 121, 132, 138, 139, 140, 129, 128, 136, 137
*Nset, nset=primary_outer
1, 4, 5, 8, 12, 13
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*Nset, nset=secondary_outer
72, 73, 76, 77, 80, 84
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*Nset, nset=secondary_contact_nodes
71, 74, 75, 78, 82, 83
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*Elset, elset=SECONDARY_TOP_ELEMENTS
11, 12
*Surface, type=ELEMENT, name=PRIMARY_CONTACT
PRIMARY, S4
*Surface, type=ELEMENT, name=SECONDARY_CONTACT
SECONDARY, S6
*Surface, type=ELEMENT, name=SECONDARY_TOP
SECONDARY_TOP_ELEMENTS, S2
*Material, name=PRIMARY_MATERIAL
*Elastic
1000000000, 0.25
*Material, name=SECONDARY_MATERIAL
*Elastic
1000000000, 0.25
*Solid Section, elset=PRIMARY, material=PRIMARY_MATERIAL
,
*Solid Section, elset=SECONDARY, material=SECONDARY_MATERIAL
,
*Surface Interaction, name=PENALTY_CONTACT
*Surface Behavior, pressure-overclosure=LINEAR
100000000000,
*Contact Pair, interaction=PENALTY_CONTACT, type=SURFACE TO SURFACE, small sliding, adjust=0.
SECONDARY_CONTACT, PRIMARY_CONTACT
*Step, name=LOAD, nlgeom=NO, inc=100
*Static
0.1, 1., 1.e-8, 0.1
*Boundary
primary_outer, 1, 3, 0.
secondary_outer, 1, 1, -9.063077870366499e-06
secondary_outer, 2, 2, -4.226182617406994e-06
secondary_outer, 3, 3, 0.
*Output, field, frequency=1
*Node Output
COORD, RF, U
*Contact Output
CSTRESS, CDISP, CFORCE
*End Step
