*HEADING
DC3D20 steady source flux convection
*INCLUDE, INPUT=dc3d20_mesh.inp
*MATERIAL, NAME=SOLID
*CONDUCTIVITY
10.
*DENSITY
1000.
*SPECIFIC HEAT
100.
*SOLID SECTION, ELSET=SOLID, MATERIAL=SOLID
*STEP, NAME=STEADY
*HEAT TRANSFER, STEADY STATE
1., 1.
*DFLUX
SOLID, BF, 100000.
1, S6, 1000.
*FILM
4, F4, 300., 100.
*OUTPUT, FIELD, FREQUENCY=1
*NODE OUTPUT
NT, RFL
*ELEMENT OUTPUT
HFL, COORD
*END STEP
