*HEADING
DCAX4 fixed geometry heat transfer, default native capacity
*INCLUDE, INPUT=dcax4_mesh.inp
*MATERIAL, NAME=SOLID
*CONDUCTIVITY
10.
*DENSITY
1000.
*SPECIFIC HEAT
100.
*SOLID SECTION, ELSET=SOLID, MATERIAL=SOLID
*INITIAL CONDITIONS, TYPE=TEMPERATURE
ALL, 300.
LEFT, 400.
*STEP, NAME=HEATING, INC=20, AMPLITUDE=STEP
*HEAT TRANSFER
2., 20.
*BOUNDARY
LEFT, 11, 11, 400.
*FILM
4, F2, 300., 100.
*OUTPUT, FIELD, FREQUENCY=1
*NODE OUTPUT
NT, RFL
*ELEMENT OUTPUT
HFL, COORD
*END STEP
