*HEADING
DC3D8 prescribed uniform ramp isolates endpoint specific heat from enthalpy
*INCLUDE, INPUT=dc3d8_capacity_mesh.inp
*MATERIAL, NAME=SOLID
*CONDUCTIVITY
10.
*DENSITY
1000.
*SPECIFIC HEAT
100.,300.
300.,500.
*SOLID SECTION, ELSET=SOLID, MATERIAL=SOLID
*INITIAL CONDITIONS, TYPE=TEMPERATURE
ALL,300.
*STEP, NAME=HEATING, INC=1, AMPLITUDE=RAMP
*HEAT TRANSFER
1.,1.,1.,1.
*BOUNDARY
ALL,11,11,400.
*OUTPUT, FIELD, FREQUENCY=1
*NODE OUTPUT
NT,RFL
*ELEMENT OUTPUT
HFL,COORD
*END STEP
