*HEADING
DCAX4 isolated temperature dependent conductivity
*INCLUDE, INPUT=dcax4_mesh.inp
*NSET, NSET=RIGHT
9,10
*MATERIAL, NAME=SOLID
*CONDUCTIVITY
10.,300.
20.,500.
*DENSITY
1000.
*SPECIFIC HEAT
100.
*SOLID SECTION, ELSET=SOLID, MATERIAL=SOLID
*STEP, NAME=STEADY
*HEAT TRANSFER, STEADY STATE
1.,1.
*BOUNDARY
LEFT,11,11,400.
RIGHT,11,11,300.
*OUTPUT, FIELD, FREQUENCY=1
*NODE OUTPUT
NT,RFL
*ELEMENT OUTPUT
HFL,COORD
*END STEP
